<!--
    Generated by vsp2jsbsim.py
    Author: Jüttner Domokos
-->
<aerodynamics>

    <function name="aero/beta-deg-abs">
	<description>Beta absolute value</description>
	<abs>
	    <property>aero/beta-deg</property>
	</abs>
    </function>

    <function name="aero/pb">
	<description>PB Denormalization</description>
	<product>
	    <property>aero/bi2vel</property>
	    <property>velocities/p-aero-rad_sec</property>
	</product>
    </function>

    <function name="aero/qb">
	<description>For denormalization</description>
	<product>
	    <property>aero/ci2vel</property>
	    <property>velocities/q-aero-rad_sec</property>
	</product>
    </function>

    <function name="aero/rb">
	<description>For denormalization</description>
	<product>
	    <property>aero/bi2vel</property>
	    <property>velocities/r-aero-rad_sec</property>
	</product>
    </function>

    <!-- CL -->
    <!-- base -->
    <function name="aero/CL_base">
	<product>
	    <table>
		<independentVar lookup="row">velocities/mach</independentVar>
		<independentVar lookup="column">aero/alpha-deg</independentVar>
		<independentVar lookup="table">aero/beta-deg</independentVar>
		<tableData breakPoint="-10.00000">
                    -10.00     -5.00      0.00      5.00     10.00     15.00     20.00     30.00
		    0.20000  -0.46626  -0.14142   0.18638   0.50290   0.80325   1.06794   1.27781   1.53861
		    0.50000  -0.48987  -0.14836   0.19778   0.53330   0.84679   1.12899   1.35162   1.62595
		    0.90000  -0.59932  -0.17903   0.24915   0.66373   1.05782   1.41080   1.70226   2.04367
		</tableData>

		<tableData breakPoint="0.00000">
                    -10.00     -5.00      0.00      5.00     10.00     15.00     20.00     30.00
		    0.20000  -0.47423  -0.14206   0.18760   0.51448   0.81327   1.09116   1.32133   1.58419
		    0.50000  -0.49969  -0.14899   0.19880   0.54670   0.86248   1.15250   1.39540   1.67712
		    0.90000  -0.61760  -0.18222   0.24979   0.68395   1.09109   1.45447   1.75634   2.11040
		</tableData>

		<tableData breakPoint="10.00000">
                    -10.00     -5.00      0.00      5.00     10.00     15.00     20.00     30.00
		    0.20000  -0.46625  -0.14142   0.18638   0.50290   0.80325   1.06794   1.27781   1.53862
		    0.50000  -0.48987  -0.14836   0.19778   0.53330   0.84679   1.12899   1.35163   1.62595
		    0.90000  -0.59932  -0.17903   0.24914   0.66373   1.05782   1.41080   1.70226   2.04367
		</tableData>

	    </table>
	    <property>aero/tune/CL_base</property>
	</product>
    </function>

    <!-- elevator -->
    <function name="aero/CL_elevator_-24">
	<table>
	    <independentVar lookup="row">velocities/mach</independentVar>
	    <independentVar lookup="column">aero/alpha-deg</independentVar>
	    <independentVar lookup="table">aero/beta-deg</independentVar>
	    <tableData breakPoint="-10.00000">
                -10.00     -5.00      0.00      5.00     10.00     15.00     20.00     30.00
		0.20000  -0.17617  -0.21132  -0.23891  -0.25688  -0.27214  -0.27807  -0.27085  -0.23678
		0.50000  -0.17796  -0.21389  -0.24429  -0.26335  -0.27552  -0.28941  -0.28256  -0.24950
		0.90000  -0.18898  -0.23088  -0.27433  -0.28482  -0.30757  -0.31171  -0.31723  -0.31301
	    </tableData>

	    <tableData breakPoint="0.00000">
                -10.00     -5.00      0.00      5.00     10.00     15.00     20.00     30.00
		0.20000  -0.18497  -0.21484  -0.23819  -0.26126  -0.27330  -0.28759  -0.28272  -0.24905
		0.50000  -0.18614  -0.21779  -0.24258  -0.26712  -0.28067  -0.29456  -0.29360  -0.25993
		0.90000  -0.18949  -0.23542  -0.26570  -0.30382  -0.31695  -0.32925  -0.33676  -0.32738
	    </tableData>

	    <tableData breakPoint="10.00000">
                -10.00     -5.00      0.00      5.00     10.00     15.00     20.00     30.00
		0.20000  -0.17618  -0.21132  -0.23891  -0.25688  -0.27214  -0.27807  -0.27084  -0.23680
		0.50000  -0.17796  -0.21387  -0.24429  -0.26334  -0.27552  -0.28941  -0.28257  -0.24950
		0.90000  -0.18898  -0.23088  -0.27432  -0.28482  -0.30757  -0.31171  -0.31723  -0.31301
	    </tableData>

	</table>
    </function>

    <function name="aero/CL_elevator_-9.5">
	<table>
	    <independentVar lookup="row">velocities/mach</independentVar>
	    <independentVar lookup="column">aero/alpha-deg</independentVar>
	    <independentVar lookup="table">aero/beta-deg</independentVar>
	    <tableData breakPoint="-10.00000">
                -10.00     -5.00      0.00      5.00     10.00     15.00     20.00     30.00
		0.20000  -0.09728  -0.10480  -0.11026  -0.10552  -0.11258  -0.10819  -0.10366  -0.07669
		0.50000  -0.10172  -0.10847  -0.11468  -0.10611  -0.11374  -0.11424  -0.10875  -0.08417
		0.90000  -0.11787  -0.12599  -0.13546  -0.12807  -0.13495  -0.13508  -0.12926  -0.11614
	    </tableData>

	    <tableData breakPoint="0.00000">
                -10.00     -5.00      0.00      5.00     10.00     15.00     20.00     30.00
		0.20000  -0.09914  -0.10563  -0.10996  -0.11482  -0.10898  -0.11838  -0.10653  -0.07838
		0.50000  -0.10249  -0.10936  -0.11361  -0.12009  -0.11376  -0.12168  -0.11206  -0.08202
		0.90000  -0.12081  -0.12840  -0.13099  -0.14050  -0.13834  -0.14179  -0.12833  -0.11175
	    </tableData>

	    <tableData breakPoint="10.00000">
                -10.00     -5.00      0.00      5.00     10.00     15.00     20.00     30.00
		0.20000  -0.09730  -0.10480  -0.11026  -0.10552  -0.11258  -0.10819  -0.10367  -0.07669
		0.50000  -0.10173  -0.10847  -0.11467  -0.10611  -0.11374  -0.11424  -0.10876  -0.08417
		0.90000  -0.11787  -0.12599  -0.13545  -0.12807  -0.13495  -0.13508  -0.12921  -0.11614
	    </tableData>

	</table>
    </function>

    <function name="aero/CL_elevator_1.5">
	<table>
	    <independentVar lookup="row">velocities/mach</independentVar>
	    <independentVar lookup="column">aero/alpha-deg</independentVar>
	    <independentVar lookup="table">aero/beta-deg</independentVar>
	    <tableData breakPoint="-10.00000">
                -10.00     -5.00      0.00      5.00     10.00     15.00     20.00     30.00
		0.20000  -0.00048   0.00021   0.00091   0.00103  -0.00010   0.00112   0.00172   0.00027
		0.50000  -0.00161   0.00018   0.00061   0.00035   0.00161  -0.00010   0.00000   0.00014
	    </tableData>

	    <tableData breakPoint="0.00000">
                -10.00     -5.00      0.00      5.00     10.00     15.00     20.00     30.00
		0.20000  -0.00013   0.00000  -0.00038   0.00000   0.00024  -0.00072   0.00053   0.00033
		0.50000   0.00000   0.00000  -0.00026   0.00000   0.00032   0.00138   0.00030  -0.00015
	    </tableData>

	    <tableData breakPoint="10.00000">
                -10.00     -5.00      0.00      5.00     10.00     15.00     20.00     30.00
		0.20000  -0.00049   0.00021   0.00091   0.00103  -0.00010   0.00113   0.00172   0.00026
		0.50000  -0.00161   0.00018   0.00061   0.00035   0.00160   0.00000   0.00000   0.00014
	    </tableData>

	</table>
    </function>

    <function name="aero/CL_elevator">
	<product>
	    <property>aero/tune/CL_elevator</property>
	    <interpolate1d>
		<property>fcs/surfaces/elevator-pos-deg</property>
		<value>-24</value> <property>aero/CL_elevator_-24</property>
		<value>-9.5</value> <property>aero/CL_elevator_-9.5</property>
		<value>0</value> <value>0</value>
		<value>1.5</value> <property>aero/CL_elevator_1.5</property>
	    </interpolate1d>
	</product>
    </function>

    <!-- flap -->
    <function name="aero/CL_flap_30">
	<table>
	    <independentVar lookup="row">velocities/mach</independentVar>
	    <independentVar lookup="column">aero/alpha-deg</independentVar>
	    <independentVar lookup="table">aero/beta-deg</independentVar>
	    <tableData breakPoint="-10.00000">
                -10.00     -5.00      0.00      5.00     10.00     15.00     20.00     30.00
		0.20000   0.63936   0.62483   0.60197   0.58967   0.54008   0.49139   0.44446   0.31332
		0.50000   0.68550   0.67176   0.64376   0.62242   0.57842   0.51044   0.46434   0.33325
		0.90000   0.95115   0.93050   0.90215   0.85809   0.79212   0.72203   0.63488   0.44758
	    </tableData>

	    <tableData breakPoint="0.00000">
                -10.00     -5.00      0.00      5.00     10.00     15.00     20.00     30.00
		0.20000   0.65170   0.63377   0.60676   0.57550   0.54055   0.50175   0.44541   0.34588
		0.50000   0.70042   0.68110   0.65549   0.62108   0.59475   0.53343   0.47866   0.36017
		0.90000   0.97735   0.94427   0.91650   0.87783   0.81976   0.74732   0.65105   0.46747
	    </tableData>

	    <tableData breakPoint="10.00000">
                -10.00     -5.00      0.00      5.00     10.00     15.00     20.00     30.00
		0.20000   0.63935   0.62483   0.60197   0.58968   0.54009   0.49139   0.44446   0.31331
		0.50000   0.68550   0.67176   0.64375   0.62241   0.57843   0.51043   0.46432   0.33325
		0.90000   0.95115   0.93049   0.90215   0.85809   0.79212   0.72204   0.63488   0.44758
	    </tableData>

	</table>
    </function>

    <function name="aero/CL_flap_40">
	<table>
	    <independentVar lookup="row">velocities/mach</independentVar>
	    <independentVar lookup="column">aero/alpha-deg</independentVar>
	    <independentVar lookup="table">aero/beta-deg</independentVar>
	    <tableData breakPoint="-10.00000">
                -10.00     -5.00      0.00      5.00     10.00     15.00     20.00     30.00
		0.20000   0.74930   0.72702   0.69683   0.67700   0.62071   0.55829   0.50356   0.35183
		0.50000   0.80039   0.78366   0.74563   0.71879   0.67015   0.58665   0.52721   0.37151
		0.90000   1.11299   1.08643   1.04432   0.98850   0.90773   0.81739   0.71874   0.49825
	    </tableData>

	    <tableData breakPoint="0.00000">
                -10.00     -5.00      0.00      5.00     10.00     15.00     20.00     30.00
		0.20000   0.76139   0.73837   0.70418   0.66692   0.61982   0.56841   0.50484   0.38534
		0.50000   0.81895   0.79281   0.76122   0.71442   0.67027   0.60575   0.54032   0.40231
		0.90000   1.14502   1.10169   1.06437   1.01214   0.93802   0.84914   0.73406   0.52051
	    </tableData>

	    <tableData breakPoint="10.00000">
                -10.00     -5.00      0.00      5.00     10.00     15.00     20.00     30.00
		0.20000   0.74929   0.72702   0.69684   0.67699   0.62071   0.55829   0.50356   0.35182
		0.50000   0.80040   0.78366   0.74563   0.71871   0.67016   0.58664   0.52719   0.37152
		0.90000   1.11299   1.08643   1.04432   0.98850   0.90774   0.81740   0.71874   0.49827
	    </tableData>

	</table>
    </function>

    <function name="aero/CL_flap">
	<product>
	    <property>aero/tune/CL_flap</property>
	    <interpolate1d>
		<property>fcs/surfaces/flap-pos-deg</property>
		<value>0</value> <value>0</value>
		<value>30</value> <property>aero/CL_flap_30</property>
		<value>40</value> <property>aero/CL_flap_40</property>
	    </interpolate1d>
	</product>
    </function>

    <!-- left-flaperon -->
    <function name="aero/CL_left-flaperon_-51">
	<table>
	    <independentVar lookup="row">velocities/mach</independentVar>
	    <independentVar lookup="column">aero/alpha-deg</independentVar>
	    <independentVar lookup="table">aero/beta-deg</independentVar>
	    <tableData breakPoint="-10.00000">
                -5.00      0.00      5.00     10.00     15.00     20.00     30.00
		0.20000  -0.32324  -0.33598  -0.34540  -0.34937  -0.33812  -0.32876  -0.29404
		0.50000  -0.34757  -0.36543  -0.37702  -0.37585  -0.36555  -0.35458  -0.31969
		0.90000  -0.47365  -0.52705  -0.52855  -0.53116  -0.52854  -0.51702  -0.45899
	    </tableData>

	    <tableData breakPoint="0.00000">
                -5.00      0.00      5.00     10.00     15.00     20.00     30.00
		0.20000  -0.32849  -0.33867  -0.35620  -0.35743  -0.35821  -0.34803  -0.30105
		0.50000  -0.35341  -0.36500  -0.38590  -0.38624  -0.38467  -0.37547  -0.32992
		0.90000  -0.49943  -0.51967  -0.54608  -0.55815  -0.55414  -0.53567  -0.47495
	    </tableData>

	    <tableData breakPoint="10.00000">
                -5.00      0.00      5.00     10.00     15.00     20.00     30.00
		0.20000  -0.32401  -0.33632  -0.35413  -0.36330  -0.36105  -0.34562  -0.30123
		0.50000  -0.34828  -0.36078  -0.38084  -0.38860  -0.38659  -0.37332  -0.32643
		0.90000  -0.49610  -0.51649  -0.53942  -0.54898  -0.54364  -0.53368  -0.46227
	    </tableData>

	</table>
    </function>

    <function name="aero/CL_left-flaperon">
	<product>
	    <property>aero/tune/CL_left-flaperon</property>
	    <interpolate1d>
		<property>fcs/surfaces/left-flaperon-pos-deg</property>
		<value>-51</value> <property>aero/CL_left-flaperon_-51</property>
		<value>0</value> <value>0</value>
	    </interpolate1d>
	</product>
    </function>

    <!-- right-flaperon -->
    <function name="aero/CL_right-flaperon_-51">
	<table>
	    <independentVar lookup="row">velocities/mach</independentVar>
	    <independentVar lookup="column">aero/alpha-deg</independentVar>
	    <independentVar lookup="table">aero/beta-deg</independentVar>
	    <tableData breakPoint="-10.00000">
                -10.00     -5.00      0.00      5.00     10.00     15.00     20.00     30.00
		0.20000  -0.27479  -0.28139  -0.28552  -0.29787  -0.30201  -0.29600  -0.28062  -0.23686
		0.50000  -0.29476  -0.30240  -0.30592  -0.32044  -0.32266  -0.31740  -0.30198  -0.25706
		0.90000  -0.42120  -0.43518  -0.44612  -0.46134  -0.46374  -0.45579  -0.44038  -0.37137
	    </tableData>

	    <tableData breakPoint="0.00000">
                -10.00     -5.00      0.00      5.00     10.00     15.00     20.00     30.00
		0.20000  -0.27127  -0.28197  -0.28615  -0.29643  -0.29357  -0.29058  -0.27848  -0.23488
		0.50000  -0.29398  -0.30504  -0.30881  -0.32319  -0.31826  -0.31288  -0.30104  -0.26026
		0.90000  -0.42354  -0.43750  -0.44760  -0.46518  -0.47003  -0.46073  -0.43997  -0.38118
	    </tableData>

	    <tableData breakPoint="10.00000">
                -10.00     -5.00      0.00      5.00     10.00     15.00     20.00     30.00
		0.20000  -0.25977  -0.27967  -0.28458  -0.28459  -0.28554  -0.27328  -0.26118  -0.23035
		0.50000  -0.27978  -0.30084  -0.31164  -0.31198  -0.30343  -0.29622  -0.28396  -0.25143
		0.90000  -0.39994  -0.41687  -0.45834  -0.45067  -0.44576  -0.43908  -0.42354  -0.36882
	    </tableData>

	</table>
    </function>

    <function name="aero/CL_right-flaperon">
	<product>
	    <property>aero/tune/CL_right-flaperon</property>
	    <interpolate1d>
		<property>fcs/surfaces/right-flaperon-pos-deg</property>
		<value>-51</value> <property>aero/CL_right-flaperon_-51</property>
		<value>0</value> <value>0</value>
	    </interpolate1d>
	</product>
    </function>

    <!-- rudder -->
    <function name="aero/CL_rudder_-35">
	<table>
	    <independentVar lookup="row">velocities/mach</independentVar>
	    <independentVar lookup="column">aero/alpha-deg</independentVar>
	    <independentVar lookup="table">aero/beta-deg</independentVar>
	    <tableData breakPoint="-10.00000">
                -10.00     -5.00      0.00      5.00     10.00     15.00     20.00     30.00
		0.20000   0.00667   0.00559   0.00525   0.00235   0.00068  -0.00997  -0.01171  -0.00968
		0.50000   0.00537   0.00620   0.00636   0.00373   0.00187  -0.00713  -0.01019  -0.01512
		0.90000   0.00903   0.00857   0.01389   0.00748   0.00317  -0.00287  -0.00846  -0.00824
	    </tableData>

	    <tableData breakPoint="0.00000">
                -10.00     -5.00      0.00      5.00     10.00     15.00     20.00     30.00
		0.20000   0.01851   0.01619   0.01243   0.01134   0.00820   0.00916   0.00397   0.00475
		0.50000   0.01816   0.01662   0.01375   0.01094   0.00807   0.01108   0.00583   0.00390
		0.90000   0.01957   0.01842   0.01652   0.01413   0.01218   0.00875   0.00519   0.00280
	    </tableData>

	    <tableData breakPoint="10.00000">
                -10.00     -5.00      0.00      5.00     10.00     15.00     20.00     30.00
		0.20000   0.02469   0.02149   0.02525   0.02475   0.01763   0.01825   0.02416   0.01568
		0.50000   0.02549   0.02246   0.02183   0.01703   0.01700   0.02213   0.01771   0.01269
		0.90000   0.02725   0.02577   0.01813   0.02022   0.01511   0.01833   0.01895   0.01081
	    </tableData>

	</table>
    </function>

    <function name="aero/CL_rudder_4">
	<table>
	    <independentVar lookup="row">velocities/mach</independentVar>
	    <independentVar lookup="column">aero/alpha-deg</independentVar>
	    <independentVar lookup="table">aero/beta-deg</independentVar>
	    <tableData breakPoint="-10.00000">
                -10.00     -5.00      0.00      5.00     10.00     15.00     20.00     30.00
		0.20000   0.00252   0.00175   0.00257   0.00257   0.00284   0.00103   0.00418   0.00178
		0.50000   0.00170   0.00173   0.00184   0.00261   0.00215   0.00198   0.00240   0.00202
		0.90000   0.00210   0.00187   0.00130   0.00110   0.00023   0.00203   0.00267   0.00151
	    </tableData>

	    <tableData breakPoint="0.00000">
                -10.00     -5.00      0.00      5.00     10.00     15.00     20.00     30.00
		0.20000   0.00040   0.00033   0.00000   0.00033   0.00085   0.00061  -0.00015   0.00021
		0.50000   0.00034   0.00032   0.00038   0.00025   0.00066   0.00069   0.00000   0.00052
		0.90000   0.00033   0.00040   0.00033   0.00033   0.00023   0.00033   0.00034   0.00036
	    </tableData>

	    <tableData breakPoint="10.00000">
                -10.00     -5.00      0.00      5.00     10.00     15.00     20.00     30.00
		0.20000  -0.00180  -0.00115  -0.00150  -0.00164  -0.00174  -0.00319  -0.00242  -0.00209
		0.50000  -0.00088  -0.00112  -0.00124  -0.00125   0.00000  -0.00425  -0.00275  -0.00254
		0.90000  -0.00140  -0.00108  -0.00071  -0.00049  -0.00131  -0.00076  -0.00182  -0.00127
	    </tableData>

	</table>
    </function>

    <function name="aero/CL_rudder_-4">
	<table>
	    <independentVar lookup="row">velocities/mach</independentVar>
	    <independentVar lookup="column">aero/alpha-deg</independentVar>
	    <independentVar lookup="table">aero/beta-deg</independentVar>
	    <tableData breakPoint="-10.00000">
                -10.00     -5.00      0.00      5.00     10.00     15.00     20.00     30.00
		0.20000  -0.00179  -0.00115  -0.00150  -0.00164  -0.00174  -0.00319  -0.00242  -0.00208
		0.50000  -0.00088  -0.00112  -0.00124  -0.00125   0.00000  -0.00425  -0.00275  -0.00254
		0.90000  -0.00140  -0.00108  -0.00072  -0.00049  -0.00131  -0.00076  -0.00182  -0.00127
	    </tableData>

	    <tableData breakPoint="0.00000">
                -10.00     -5.00      0.00      5.00     10.00     15.00     20.00     30.00
		0.20000   0.00040   0.00033   0.00000   0.00033   0.00085   0.00061  -0.00015   0.00021
		0.50000   0.00034   0.00032   0.00038   0.00025   0.00066   0.00069   0.00000   0.00052
		0.90000   0.00033   0.00040   0.00033   0.00033   0.00023   0.00033   0.00034   0.00037
	    </tableData>

	    <tableData breakPoint="10.00000">
                -10.00     -5.00      0.00      5.00     10.00     15.00     20.00     30.00
		0.20000   0.00251   0.00175   0.00257   0.00257   0.00284   0.00103   0.00418   0.00178
		0.50000   0.00170   0.00173   0.00184   0.00261   0.00215   0.00198   0.00239   0.00202
		0.90000   0.00210   0.00187   0.00131   0.00110   0.00023   0.00203   0.00267   0.00151
	    </tableData>

	</table>
    </function>

    <function name="aero/CL_rudder_35">
	<table>
	    <independentVar lookup="row">velocities/mach</independentVar>
	    <independentVar lookup="column">aero/alpha-deg</independentVar>
	    <independentVar lookup="table">aero/beta-deg</independentVar>
	    <tableData breakPoint="-10.00000">
                -10.00     -5.00      0.00      5.00     10.00     15.00     20.00     30.00
		0.20000   0.02470   0.02149   0.02526   0.02474   0.01763   0.01825   0.02416   0.01568
		0.50000   0.02549   0.02246   0.02183   0.01702   0.01700   0.02213   0.01772   0.01269
		0.90000   0.02725   0.02577   0.01812   0.02022   0.01511   0.01833   0.01896   0.01081
	    </tableData>

	    <tableData breakPoint="0.00000">
                -10.00     -5.00      0.00      5.00     10.00     15.00     20.00     30.00
		0.20000   0.01851   0.01619   0.01243   0.01134   0.00820   0.00915   0.00396   0.00475
		0.50000   0.01817   0.01662   0.01375   0.01094   0.00766   0.01108   0.00584   0.00390
		0.90000   0.01957   0.01842   0.01652   0.01413   0.01218   0.00875   0.00519   0.00280
	    </tableData>

	    <tableData breakPoint="10.00000">
                -10.00     -5.00      0.00      5.00     10.00     15.00     20.00     30.00
		0.20000   0.00666   0.00559   0.00525   0.00235   0.00068  -0.00997  -0.01171  -0.00969
		0.50000   0.00537   0.00620   0.00636   0.00373   0.00187  -0.00713  -0.01020  -0.01512
		0.90000   0.00903   0.00857   0.01390   0.00748   0.00317  -0.00287  -0.00846  -0.00824
	    </tableData>

	</table>
    </function>

    <function name="aero/CL_rudder">
	<product>
	    <property>aero/tune/CL_rudder</property>
	    <interpolate1d>
		<property>fcs/surfaces/rudder-pos-deg</property>
		<value>-35</value> <property>aero/CL_rudder_-35</property>
		<value>-4</value> <property>aero/CL_rudder_-4</property>
		<value>0</value> <value>0</value>
		<value>4</value> <property>aero/CL_rudder_4</property>
		<value>35</value> <property>aero/CL_rudder_35</property>
	    </interpolate1d>
	</product>
    </function>

    <!-- slats -->
    <function name="aero/CL_slats_27.5">
	<table>
	    <independentVar lookup="row">velocities/mach</independentVar>
	    <independentVar lookup="column">aero/alpha-deg</independentVar>
	    <independentVar lookup="table">aero/beta-deg</independentVar>
	    <tableData breakPoint="-10.00000">
                -10.00     -5.00      0.00      5.00     10.00     15.00     20.00     30.00
		0.20000  -0.00182  -0.00530  -0.00568  -0.00279   0.00422   0.01456   0.02851   0.05992
		0.50000  -0.00153  -0.00536  -0.00609  -0.00245   0.00467   0.01574   0.03010   0.06356
		0.90000   0.00067  -0.00447  -0.00535  -0.00134   0.00728   0.02120   0.03923   0.08201
	    </tableData>

	    <tableData breakPoint="0.00000">
                -10.00     -5.00      0.00      5.00     10.00     15.00     20.00     30.00
		0.20000  -0.00153  -0.00560  -0.00615  -0.00289   0.00424   0.01530   0.02862   0.06145
		0.50000  -0.00138  -0.00572  -0.00625  -0.00294   0.00481   0.01604   0.03046   0.06542
		0.90000   0.00055  -0.00483  -0.00579  -0.00191   0.00737   0.02155   0.04024   0.08442
	    </tableData>

	    <tableData breakPoint="10.00000">
                -10.00     -5.00      0.00      5.00     10.00     15.00     20.00     30.00
		0.20000  -0.00143  -0.00555  -0.00603  -0.00301   0.00365   0.01379   0.02733   0.05922
		0.50000  -0.00126  -0.00563  -0.00636  -0.00296   0.00439   0.01519   0.02947   0.06285
		0.90000   0.00066  -0.00493  -0.00597  -0.00213   0.00676   0.02088   0.03883   0.08218
	    </tableData>

	</table>
    </function>

    <function name="aero/CL_slats">
	<product>
	    <property>aero/tune/CL_slats</property>
	    <interpolate1d>
		<property>fcs/surfaces/slats-pos-deg</property>
		<value>0</value> <value>0</value>
		<value>27.5</value> <property>aero/CL_slats_27.5</property>
	    </interpolate1d>
	</product>
    </function>

    <!-- speedbrake -->
    <function name="aero/CL_speedbrake_60">
	<table>
	    <independentVar lookup="row">velocities/mach</independentVar>
	    <independentVar lookup="column">aero/alpha-deg</independentVar>
	    <independentVar lookup="table">aero/beta-deg</independentVar>
	    <tableData breakPoint="-10.00000">
                -10.00     -5.00      0.00      5.00     10.00     15.00     20.00     30.00
		0.20000  -0.12285  -0.12694  -0.13229  -0.13192  -0.13233  -0.12531  -0.11635  -0.09187
		0.50000  -0.13267  -0.13672  -0.14163  -0.14264  -0.14116  -0.13596  -0.12688  -0.10159
	    </tableData>

	    <tableData breakPoint="0.00000">
                -10.00     -5.00      0.00      5.00     10.00     15.00     20.00     30.00
		0.20000  -0.12766  -0.13683  -0.14172  -0.14368  -0.13843  -0.13810  -0.12890  -0.09475
		0.50000  -0.13732  -0.14647  -0.15116  -0.15434  -0.14874  -0.14428  -0.13841  -0.10397
	    </tableData>

	    <tableData breakPoint="10.00000">
                -10.00     -5.00      0.00      5.00     10.00     15.00     20.00     30.00
		0.20000  -0.13068  -0.13340  -0.13583  -0.14067  -0.14485  -0.13763  -0.12785  -0.09740
		0.50000  -0.13797  -0.14135  -0.14720  -0.14835  -0.15187  -0.14553  -0.13848  -0.10552
	    </tableData>

	</table>
    </function>

    <function name="aero/CL_speedbrake">
	<product>
	    <property>aero/tune/CL_speedbrake</property>
	    <interpolate1d>
		<property>fcs/surfaces/speedbrake-pos-deg</property>
		<value>0</value> <value>0</value>
		<value>60</value> <property>aero/CL_speedbrake_60</property>
	    </interpolate1d>
	</product>
    </function>

    <!-- CDTOT -->
    <!-- base -->
    <function name="aero/CDtot_base">
	<table>
	    <independentVar lookup="row">velocities/mach</independentVar>
	    <independentVar lookup="column">aero/alpha-deg</independentVar>
	    <independentVar lookup="table">aero/beta-deg</independentVar>
	    <tableData breakPoint="-10.00000">
                -10.00     -5.00      0.00      5.00     10.00     15.00     20.00     30.00
		0.20000   0.04914   0.02743   0.02723   0.05060   0.09731   0.16063   0.23474   0.47532
		0.50000   0.05162   0.02783   0.02786   0.05404   0.10549   0.17693   0.25934   0.53302
		0.90000   0.06437   0.02910   0.03098   0.07182   0.14871   0.25847   0.39060   0.85315
	    </tableData>

	    <tableData breakPoint="0.00000">
                -10.00     -5.00      0.00      5.00     10.00     15.00     20.00     30.00
		0.20000   0.04550   0.02339   0.02705   0.04936   0.09574   0.16356   0.25067   0.47117
		0.50000   0.04828   0.02369   0.02779   0.05289   0.10481   0.18113   0.28020   0.53262
		0.90000   0.06348   0.02551   0.03183   0.07054   0.15211   0.27344   0.43524   0.88127
	    </tableData>

	    <tableData breakPoint="10.00000">
                -10.00     -5.00      0.00      5.00     10.00     15.00     20.00     30.00
		0.20000   0.04914   0.02743   0.02723   0.05060   0.09731   0.16063   0.23474   0.47532
		0.50000   0.05162   0.02783   0.02786   0.05404   0.10549   0.17693   0.25934   0.53302
		0.90000   0.06437   0.02910   0.03098   0.07182   0.14871   0.25847   0.39060   0.85315
	    </tableData>

	</table>
    </function>

    <!-- elevator -->
    <function name="aero/CDtot_elevator_-24">
	<table>
	    <independentVar lookup="row">velocities/mach</independentVar>
	    <independentVar lookup="column">aero/alpha-deg</independentVar>
	    <independentVar lookup="table">aero/beta-deg</independentVar>
	    <tableData breakPoint="-10.00000">
                -10.00     -5.00      0.00      5.00     10.00     15.00     20.00     30.00
		0.20000   0.06924   0.04974   0.04492   0.01207  -0.00246  -0.02927  -0.03145  -0.09251
		0.50000   0.07134   0.05146   0.04691   0.01236  -0.00127  -0.02985  -0.03207  -0.09591
		0.90000   0.08888   0.06544   0.05998   0.01557   0.00794  -0.02506  -0.03847  -0.11650
	    </tableData>

	    <tableData breakPoint="0.00000">
                -10.00     -5.00      0.00      5.00     10.00     15.00     20.00     30.00
		0.20000   0.07904   0.06166   0.03831   0.03694  -0.00231  -0.01780  -0.03810  -0.07831
		0.50000   0.08251   0.06451   0.03988   0.03971  -0.00288  -0.01942  -0.04101  -0.08377
		0.90000   0.10442   0.08370   0.05350   0.06419   0.00031  -0.02236  -0.05195  -0.11314
	    </tableData>

	    <tableData breakPoint="10.00000">
                -10.00     -5.00      0.00      5.00     10.00     15.00     20.00     30.00
		0.20000   0.06924   0.04974   0.04492   0.01207  -0.00246  -0.02927  -0.03145  -0.09251
		0.50000   0.07134   0.05147   0.04691   0.01236  -0.00127  -0.02985  -0.03207  -0.09591
		0.90000   0.08888   0.06544   0.05998   0.01557   0.00794  -0.02506  -0.03847  -0.11650
	    </tableData>

	</table>
    </function>

    <function name="aero/CDtot_elevator_-9.5">
	<table>
	    <independentVar lookup="row">velocities/mach</independentVar>
	    <independentVar lookup="column">aero/alpha-deg</independentVar>
	    <independentVar lookup="table">aero/beta-deg</independentVar>
	    <tableData breakPoint="-10.00000">
                -10.00     -5.00      0.00      5.00     10.00     15.00     20.00     30.00
		0.20000   0.02114   0.01272   0.00557  -0.00587  -0.00950  -0.01832  -0.02547  -0.05462
		0.50000   0.02261   0.01356   0.00614  -0.00582  -0.00997  -0.01994  -0.02686  -0.05630
		0.90000   0.03105   0.01864   0.00925  -0.00575  -0.01295  -0.02663  -0.03591  -0.07198
	    </tableData>

	    <tableData breakPoint="0.00000">
                -10.00     -5.00      0.00      5.00     10.00     15.00     20.00     30.00
		0.20000   0.02338   0.01522   0.00324  -0.00409  -0.01015  -0.01912  -0.02691  -0.04094
		0.50000   0.02513   0.01643   0.00353  -0.00452  -0.01102  -0.02033  -0.02903  -0.04405
		0.90000   0.03660   0.02428   0.00645  -0.00428  -0.01483  -0.02711  -0.03776  -0.06337
	    </tableData>

	    <tableData breakPoint="10.00000">
                -10.00     -5.00      0.00      5.00     10.00     15.00     20.00     30.00
		0.20000   0.02114   0.01272   0.00557  -0.00587  -0.00950  -0.01832  -0.02547  -0.05462
		0.50000   0.02261   0.01356   0.00614  -0.00582  -0.00997  -0.01994  -0.02686  -0.05629
		0.90000   0.03105   0.01864   0.00925  -0.00575  -0.01295  -0.02663  -0.03591  -0.07198
	    </tableData>

	</table>
    </function>

    <function name="aero/CDtot_elevator_1.5">
	<table>
	    <independentVar lookup="row">velocities/mach</independentVar>
	    <independentVar lookup="column">aero/alpha-deg</independentVar>
	    <independentVar lookup="table">aero/beta-deg</independentVar>
	    <tableData breakPoint="-10.00000">
                -10.00     -5.00      0.00      5.00     10.00     15.00     20.00     30.00
		0.20000   0.00000   0.00000  -0.00037   0.00000  -0.00013   0.00000   0.00024   0.00036
		0.50000   0.00000   0.00000  -0.00042   0.00000   0.00000   0.00000   0.00000   0.00038
	    </tableData>

	    <tableData breakPoint="0.00000">
                -10.00     -5.00      0.00      5.00     10.00     15.00     20.00     30.00
		0.20000   0.00000   0.00000  -0.00257   0.00000   0.00000  -0.00028   0.00000   0.00058
		0.50000   0.00000   0.00000  -0.00275   0.00000   0.00000   0.00015   0.00016   0.00018
	    </tableData>

	    <tableData breakPoint="10.00000">
                -10.00     -5.00      0.00      5.00     10.00     15.00     20.00     30.00
		0.20000   0.00000   0.00000  -0.00037   0.00000  -0.00014   0.00000   0.00024   0.00036
		0.50000   0.00000   0.00000  -0.00042   0.00000   0.00000   0.00000   0.00000   0.00038
	    </tableData>

	</table>
    </function>

    <function name="aero/CDtot_elevator">
	<product>
	    <property>aero/tune/CDtot_elevator</property>
	    <interpolate1d>
		<property>fcs/surfaces/elevator-pos-deg</property>
		<value>-24</value> <property>aero/CDtot_elevator_-24</property>
		<value>-9.5</value> <property>aero/CDtot_elevator_-9.5</property>
		<value>0</value> <value>0</value>
		<value>1.5</value> <property>aero/CDtot_elevator_1.5</property>
	    </interpolate1d>
	</product>
    </function>

    <!-- flap -->
    <function name="aero/CDtot_flap_30">
	<table>
	    <independentVar lookup="row">velocities/mach</independentVar>
	    <independentVar lookup="column">aero/alpha-deg</independentVar>
	    <independentVar lookup="table">aero/beta-deg</independentVar>
	    <tableData breakPoint="-10.00000">
                -10.00     -5.00      0.00      5.00     10.00     15.00     20.00     30.00
		0.20000   0.00702   0.04595   0.05090   0.11804   0.15091   0.17648   0.18871   0.22534
		0.50000   0.00888   0.05294   0.05779   0.13369   0.17156   0.20020   0.21913   0.26442
		0.90000   0.02946   0.10743   0.11557   0.24716   0.31464   0.37481   0.41214   0.50900
	    </tableData>

	    <tableData breakPoint="0.00000">
                -10.00     -5.00      0.00      5.00     10.00     15.00     20.00     30.00
		0.20000   0.00794   0.04926   0.16761   0.12556   0.15864   0.18712   0.20876   0.23007
		0.50000   0.00969   0.05675   0.18964   0.14339   0.18211   0.21523   0.24097   0.27402
		0.90000   0.02842   0.11115   0.33478   0.26357   0.33872   0.40344   0.45719   0.53378
	    </tableData>

	    <tableData breakPoint="10.00000">
                -10.00     -5.00      0.00      5.00     10.00     15.00     20.00     30.00
		0.20000   0.00702   0.04595   0.05090   0.11804   0.15091   0.17648   0.18871   0.22534
		0.50000   0.00888   0.05294   0.05779   0.13369   0.17156   0.20020   0.21913   0.26442
		0.90000   0.02946   0.10743   0.11556   0.24716   0.31464   0.37481   0.41214   0.50901
	    </tableData>

	</table>
    </function>

    <function name="aero/CDtot_flap_40">
	<table>
	    <independentVar lookup="row">velocities/mach</independentVar>
	    <independentVar lookup="column">aero/alpha-deg</independentVar>
	    <independentVar lookup="table">aero/beta-deg</independentVar>
	    <tableData breakPoint="-10.00000">
                -10.00     -5.00      0.00      5.00     10.00     15.00     20.00     30.00
		0.20000   0.02097   0.06512   0.06539   0.14559   0.18279   0.21056   0.22177   0.25645
		0.50000   0.02541   0.07521   0.07405   0.16560   0.20763   0.23780   0.25737   0.30135
		0.90000   0.06272   0.15019   0.14936   0.30823   0.38236   0.44695   0.48544   0.58275
	    </tableData>

	    <tableData breakPoint="0.00000">
                -10.00     -5.00      0.00      5.00     10.00     15.00     20.00     30.00
		0.20000   0.02300   0.06956   0.21662   0.15545   0.19108   0.22225   0.24373   0.26359
		0.50000   0.02714   0.07996   0.24514   0.17735   0.22006   0.25573   0.28203   0.31240
		0.90000   0.06280   0.15658   0.43315   0.32745   0.41045   0.48108   0.53564   0.61232
	    </tableData>

	    <tableData breakPoint="10.00000">
                -10.00     -5.00      0.00      5.00     10.00     15.00     20.00     30.00
		0.20000   0.02097   0.06512   0.06539   0.14559   0.18279   0.21056   0.22177   0.25645
		0.50000   0.02541   0.07521   0.07405   0.16560   0.20763   0.23780   0.25736   0.30136
		0.90000   0.06272   0.15019   0.14936   0.30823   0.38236   0.44696   0.48544   0.58275
	    </tableData>

	</table>
    </function>

    <function name="aero/CDtot_flap">
	<product>
	    <property>aero/tune/CDtot_flap</property>
	    <interpolate1d>
		<property>fcs/surfaces/flap-pos-deg</property>
		<value>0</value> <value>0</value>
		<value>30</value> <property>aero/CDtot_flap_30</property>
		<value>40</value> <property>aero/CDtot_flap_40</property>
	    </interpolate1d>
	</product>
    </function>

    <!-- left-flaperon -->
    <function name="aero/CDtot_left-flaperon_-51">
	<table>
	    <independentVar lookup="row">velocities/mach</independentVar>
	    <independentVar lookup="column">aero/alpha-deg</independentVar>
	    <independentVar lookup="table">aero/beta-deg</independentVar>
	    <tableData breakPoint="-10.00000">
                -5.00      0.00      5.00     10.00     15.00     20.00     30.00
		0.20000   0.04342   0.00717  -0.00023  -0.02355  -0.04318  -0.05899  -0.11242
		0.50000   0.04861   0.00716  -0.00068  -0.02668  -0.05002  -0.06698  -0.12960
		0.90000   0.08669   0.00970   0.00014  -0.04256  -0.08846  -0.12687  -0.25943
	    </tableData>

	    <tableData breakPoint="0.00000">
                -5.00      0.00      5.00     10.00     15.00     20.00     30.00
		0.20000   0.04138   0.03439  -0.00361  -0.02697  -0.05118  -0.07481  -0.11710
		0.50000   0.04702   0.03953  -0.00409  -0.03071  -0.05869  -0.08656  -0.13618
		0.90000   0.08797   0.07852  -0.00207  -0.04999  -0.10123  -0.15338  -0.26605
	    </tableData>

	    <tableData breakPoint="10.00000">
                -5.00      0.00      5.00     10.00     15.00     20.00     30.00
		0.20000   0.03794   0.01761  -0.00252  -0.02818  -0.05149  -0.07245  -0.11113
		0.50000   0.04273   0.01965  -0.00277  -0.03130  -0.05838  -0.08290  -0.12811
		0.90000   0.07853   0.03709  -0.00051  -0.04706  -0.09498  -0.14235  -0.24456
	    </tableData>

	</table>
    </function>

    <function name="aero/CDtot_left-flaperon">
	<product>
	    <property>aero/tune/CDtot_left-flaperon</property>
	    <interpolate1d>
		<property>fcs/surfaces/left-flaperon-pos-deg</property>
		<value>-51</value> <property>aero/CDtot_left-flaperon_-51</property>
		<value>0</value> <value>0</value>
	    </interpolate1d>
	</product>
    </function>

    <!-- right-flaperon -->
    <function name="aero/CDtot_right-flaperon_-51">
	<table>
	    <independentVar lookup="row">velocities/mach</independentVar>
	    <independentVar lookup="column">aero/alpha-deg</independentVar>
	    <independentVar lookup="table">aero/beta-deg</independentVar>
	    <tableData breakPoint="-10.00000">
                -10.00     -5.00      0.00      5.00     10.00     15.00     20.00     30.00
		0.20000   0.04670   0.02916   0.01136  -0.00581  -0.02752  -0.04692  -0.06373  -0.09244
		0.50000   0.05274   0.03288   0.01268  -0.00643  -0.03062  -0.05330  -0.07274  -0.10683
		0.90000   0.09785   0.06184   0.02563  -0.00729  -0.04733  -0.08801  -0.12778  -0.21046
	    </tableData>

	    <tableData breakPoint="0.00000">
                -10.00     -5.00      0.00      5.00     10.00     15.00     20.00     30.00
		0.20000   0.05004   0.03165   0.02282  -0.00701  -0.02653  -0.04641  -0.06552  -0.09946
		0.50000   0.05740   0.03618   0.02627  -0.00804  -0.03025  -0.05335  -0.07603  -0.11475
		0.90000   0.10886   0.06918   0.05474  -0.00976  -0.05091  -0.09408  -0.13745  -0.22919
	    </tableData>

	    <tableData breakPoint="10.00000">
                -10.00     -5.00      0.00      5.00     10.00     15.00     20.00     30.00
		0.20000   0.05191   0.03342   0.00524  -0.00396  -0.02284  -0.03900  -0.05127  -0.09428
		0.50000   0.05946   0.03746   0.00502  -0.00493  -0.02604  -0.04531  -0.05837  -0.10844
		0.90000   0.11201   0.06854   0.00713  -0.00762  -0.04351  -0.08290  -0.11411  -0.22446
	    </tableData>

	</table>
    </function>

    <function name="aero/CDtot_right-flaperon">
	<product>
	    <property>aero/tune/CDtot_right-flaperon</property>
	    <interpolate1d>
		<property>fcs/surfaces/right-flaperon-pos-deg</property>
		<value>-51</value> <property>aero/CDtot_right-flaperon_-51</property>
		<value>0</value> <value>0</value>
	    </interpolate1d>
	</product>
    </function>

    <!-- rudder -->
    <function name="aero/CDtot_rudder_-35">
	<table>
	    <independentVar lookup="row">velocities/mach</independentVar>
	    <independentVar lookup="column">aero/alpha-deg</independentVar>
	    <independentVar lookup="table">aero/beta-deg</independentVar>
	    <tableData breakPoint="-10.00000">
                -10.00     -5.00      0.00      5.00     10.00     15.00     20.00     30.00
		0.20000   0.00024   0.00064   0.00028   0.00016  -0.00051   0.00388   0.00219  -0.01655
		0.50000   0.00087   0.00112   0.00030   0.00017   0.00065   0.00558   0.00547  -0.01283
		0.90000   0.00701   0.00557   0.00020   0.00000   0.00602   0.02123   0.03049  -0.00363
	    </tableData>

	    <tableData breakPoint="0.00000">
                -10.00     -5.00      0.00      5.00     10.00     15.00     20.00     30.00
		0.20000   0.01127   0.01100   0.01051   0.01056   0.00949   0.00850   0.00818   0.00743
		0.50000   0.01206   0.01174   0.01143   0.01135   0.01016   0.00934   0.00876   0.00797
		0.90000   0.01616   0.01613   0.01585   0.01549   0.01533   0.01325   0.01251   0.01011
	    </tableData>

	    <tableData breakPoint="10.00000">
                -10.00     -5.00      0.00      5.00     10.00     15.00     20.00     30.00
		0.20000   0.02149   0.02034   0.01976   0.01908   0.01716   0.01586   0.01468   0.02660
		0.50000   0.02255   0.02160   0.02147   0.02030   0.01812   0.01538   0.01459   0.02696
		0.90000   0.02415   0.02511   0.02830   0.02805   0.02088   0.00790  -0.00202   0.02114
	    </tableData>

	</table>
    </function>

    <function name="aero/CDtot_rudder_4">
	<table>
	    <independentVar lookup="row">velocities/mach</independentVar>
	    <independentVar lookup="column">aero/alpha-deg</independentVar>
	    <independentVar lookup="table">aero/beta-deg</independentVar>
	    <tableData breakPoint="-10.00000">
                -10.00     -5.00      0.00      5.00     10.00     15.00     20.00     30.00
		0.20000   0.00189   0.00174   0.00174   0.00162   0.00173   0.00115   0.00116   0.00332
		0.50000   0.00196   0.00182   0.00189   0.00180   0.00157   0.00097   0.00135   0.00330
		0.90000   0.00178   0.00195   0.00251   0.00240   0.00168  -0.00046  -0.00153   0.00215
	    </tableData>

	    <tableData breakPoint="0.00000">
                -10.00     -5.00      0.00      5.00     10.00     15.00     20.00     30.00
		0.20000   0.00022   0.00023   0.00023   0.00019   0.00027   0.00021   0.00019   0.00020
		0.50000   0.00027   0.00025   0.00025   0.00020   0.00023   0.00024   0.00019   0.00018
		0.90000   0.00036   0.00033   0.00034   0.00034   0.00036   0.00029   0.00029   0.00028
	    </tableData>

	    <tableData breakPoint="10.00000">
                -10.00     -5.00      0.00      5.00     10.00     15.00     20.00     30.00
		0.20000  -0.00143  -0.00130  -0.00132  -0.00118  -0.00137  -0.00082  -0.00087  -0.00306
		0.50000  -0.00146  -0.00136  -0.00144  -0.00135  -0.00112  -0.00055  -0.00070  -0.00309
		0.90000  -0.00112  -0.00131  -0.00193  -0.00192  -0.00110   0.00099   0.00240  -0.00183
	    </tableData>

	</table>
    </function>

    <function name="aero/CDtot_rudder_-4">
	<table>
	    <independentVar lookup="row">velocities/mach</independentVar>
	    <independentVar lookup="column">aero/alpha-deg</independentVar>
	    <independentVar lookup="table">aero/beta-deg</independentVar>
	    <tableData breakPoint="-10.00000">
                -10.00     -5.00      0.00      5.00     10.00     15.00     20.00     30.00
		0.20000  -0.00143  -0.00130  -0.00132  -0.00118  -0.00137  -0.00082  -0.00087  -0.00307
		0.50000  -0.00146  -0.00136  -0.00144  -0.00136  -0.00112  -0.00055  -0.00070  -0.00309
		0.90000  -0.00112  -0.00131  -0.00193  -0.00192  -0.00110   0.00099   0.00240  -0.00183
	    </tableData>

	    <tableData breakPoint="0.00000">
                -10.00     -5.00      0.00      5.00     10.00     15.00     20.00     30.00
		0.20000   0.00022   0.00023   0.00023   0.00019   0.00027   0.00021   0.00020   0.00020
		0.50000   0.00027   0.00025   0.00025   0.00020   0.00023   0.00024   0.00019   0.00018
		0.90000   0.00036   0.00033   0.00034   0.00034   0.00036   0.00029   0.00029   0.00028
	    </tableData>

	    <tableData breakPoint="10.00000">
                -10.00     -5.00      0.00      5.00     10.00     15.00     20.00     30.00
		0.20000   0.00189   0.00174   0.00174   0.00162   0.00173   0.00116   0.00116   0.00332
		0.50000   0.00196   0.00182   0.00189   0.00180   0.00157   0.00097   0.00135   0.00330
		0.90000   0.00178   0.00195   0.00251   0.00240   0.00168  -0.00046  -0.00153   0.00215
	    </tableData>

	</table>
    </function>

    <function name="aero/CDtot_rudder_35">
	<table>
	    <independentVar lookup="row">velocities/mach</independentVar>
	    <independentVar lookup="column">aero/alpha-deg</independentVar>
	    <independentVar lookup="table">aero/beta-deg</independentVar>
	    <tableData breakPoint="-10.00000">
                -10.00     -5.00      0.00      5.00     10.00     15.00     20.00     30.00
		0.20000   0.02149   0.02034   0.01976   0.01908   0.01716   0.01586   0.01468   0.02660
		0.50000   0.02255   0.02160   0.02147   0.02030   0.01812   0.01538   0.01459   0.02696
		0.90000   0.02415   0.02511   0.02830   0.02805   0.02088   0.00790  -0.00202   0.02113
	    </tableData>

	    <tableData breakPoint="0.00000">
                -10.00     -5.00      0.00      5.00     10.00     15.00     20.00     30.00
		0.20000   0.01127   0.01100   0.01051   0.01056   0.00949   0.00849   0.00818   0.00743
		0.50000   0.01206   0.01174   0.01143   0.01135   0.01010   0.00934   0.00876   0.00797
		0.90000   0.01616   0.01613   0.01585   0.01549   0.01533   0.01325   0.01251   0.01011
	    </tableData>

	    <tableData breakPoint="10.00000">
                -10.00     -5.00      0.00      5.00     10.00     15.00     20.00     30.00
		0.20000   0.00024   0.00064   0.00028   0.00016  -0.00051   0.00388   0.00219  -0.01655
		0.50000   0.00087   0.00112   0.00030   0.00017   0.00065   0.00558   0.00547  -0.01283
		0.90000   0.00701   0.00557   0.00020   0.00000   0.00602   0.02123   0.03049  -0.00362
	    </tableData>

	</table>
    </function>

    <function name="aero/CDtot_rudder">
	<product>
	    <property>aero/tune/CDtot_rudder</property>
	    <interpolate1d>
		<property>fcs/surfaces/rudder-pos-deg</property>
		<value>-35</value> <property>aero/CDtot_rudder_-35</property>
		<value>-4</value> <property>aero/CDtot_rudder_-4</property>
		<value>0</value> <value>0</value>
		<value>4</value> <property>aero/CDtot_rudder_4</property>
		<value>35</value> <property>aero/CDtot_rudder_35</property>
	    </interpolate1d>
	</product>
    </function>

    <!-- slats -->
    <function name="aero/CDtot_slats_27.5">
	<table>
	    <independentVar lookup="row">velocities/mach</independentVar>
	    <independentVar lookup="column">aero/alpha-deg</independentVar>
	    <independentVar lookup="table">aero/beta-deg</independentVar>
	    <tableData breakPoint="-10.00000">
                -10.00     -5.00      0.00      5.00     10.00     15.00     20.00     30.00
		0.20000   0.00044   0.00011  -0.00027  -0.00058  -0.00097  -0.00122  -0.00135  -0.00165
		0.50000   0.00048   0.00011  -0.00029  -0.00060  -0.00102  -0.00130  -0.00152  -0.00191
		0.90000   0.00057   0.00013  -0.00031  -0.00074  -0.00116  -0.00149  -0.00169  -0.00240
	    </tableData>

	    <tableData breakPoint="0.00000">
                -10.00     -5.00      0.00      5.00     10.00     15.00     20.00     30.00
		0.20000   0.00050   0.00013  -0.00038  -0.00065  -0.00095  -0.00119  -0.00135  -0.00156
		0.50000   0.00055   0.00015  -0.00041  -0.00071  -0.00104  -0.00131  -0.00150  -0.00178
		0.90000   0.00064   0.00017  -0.00052  -0.00083  -0.00123  -0.00153  -0.00173  -0.00234
	    </tableData>

	    <tableData breakPoint="10.00000">
                -10.00     -5.00      0.00      5.00     10.00     15.00     20.00     30.00
		0.20000   0.00051   0.00016  -0.00013  -0.00057  -0.00090  -0.00109  -0.00112  -0.00136
		0.50000   0.00056   0.00016  -0.00015  -0.00062  -0.00094  -0.00116  -0.00118  -0.00164
		0.90000   0.00064   0.00016  -0.00020  -0.00080  -0.00115  -0.00139  -0.00144  -0.00206
	    </tableData>

	</table>
    </function>

    <function name="aero/CDtot_slats">
	<product>
	    <property>aero/tune/CDtot_slats</property>
	    <interpolate1d>
		<property>fcs/surfaces/slats-pos-deg</property>
		<value>0</value> <value>0</value>
		<value>27.5</value> <property>aero/CDtot_slats_27.5</property>
	    </interpolate1d>
	</product>
    </function>

    <!-- speedbrake -->
    <function name="aero/CDtot_speedbrake_60">
	<table>
	    <independentVar lookup="row">velocities/mach</independentVar>
	    <independentVar lookup="column">aero/alpha-deg</independentVar>
	    <independentVar lookup="table">aero/beta-deg</independentVar>
	    <tableData breakPoint="-10.00000">
                -10.00     -5.00      0.00      5.00     10.00     15.00     20.00     30.00
		0.20000   0.02212   0.01621   0.00941   0.00315  -0.00427  -0.01121  -0.01799  -0.02810
		0.50000   0.02438   0.01758   0.00984   0.00273  -0.00565  -0.01355  -0.02093  -0.03383
	    </tableData>

	    <tableData breakPoint="0.00000">
                -10.00     -5.00      0.00      5.00     10.00     15.00     20.00     30.00
		0.20000   0.02499   0.01858   0.01173   0.00310  -0.00423  -0.01234  -0.01924  -0.02975
		0.50000   0.02777   0.02036   0.01248   0.00257  -0.00587  -0.01473  -0.02342  -0.03601
	    </tableData>

	    <tableData breakPoint="10.00000">
                -10.00     -5.00      0.00      5.00     10.00     15.00     20.00     30.00
		0.20000   0.02549   0.01819   0.01025   0.00342  -0.00483  -0.01185  -0.01847  -0.03130
		0.50000   0.02823   0.01980   0.01079   0.00285  -0.00635  -0.01470  -0.02242  -0.03796
	    </tableData>

	</table>
    </function>

    <function name="aero/CDtot_speedbrake">
	<product>
	    <property>aero/tune/CDtot_speedbrake</property>
	    <interpolate1d>
		<property>fcs/surfaces/speedbrake-pos-deg</property>
		<value>0</value> <value>0</value>
		<value>60</value> <property>aero/CDtot_speedbrake_60</property>
	    </interpolate1d>
	</product>
    </function>

    <!-- CS -->
    <!-- base -->
    <function name="aero/CS_base">
	<table>
	    <independentVar lookup="row">velocities/mach</independentVar>
	    <independentVar lookup="column">aero/alpha-deg</independentVar>
	    <independentVar lookup="table">aero/beta-deg</independentVar>
	    <tableData breakPoint="-10.00000">
                -10.00     -5.00      0.00      5.00     10.00     15.00     20.00     30.00
		0.20000   0.03918   0.04939   0.04665   0.03530   0.01545   0.00216  -0.01883  -0.10373
		0.50000   0.03905   0.05021   0.04800   0.03515   0.01438  -0.00721  -0.02091  -0.11481
		0.90000   0.03302   0.04955   0.04848   0.03514   0.01384  -0.01425  -0.05940  -0.17024
	    </tableData>

	    <tableData breakPoint="0.00000">
                -10.00     -5.00      0.00      5.00     10.00     15.00     20.00     30.00
		0.20000   0.00000  -0.00000  -0.00000  -0.00000  -0.00000  -0.00000  -0.00000  -0.00000
		0.50000   0.00000  -0.00000  -0.00000  -0.00000  -0.00000  -0.00000  -0.00000  -0.00000
		0.90000  -0.00000  -0.00000  -0.00000  -0.00000  -0.00000   0.00000  -0.00000  -0.00000
	    </tableData>

	    <tableData breakPoint="10.00000">
                -10.00     -5.00      0.00      5.00     10.00     15.00     20.00     30.00
		0.20000  -0.03918  -0.04939  -0.04665  -0.03530  -0.01546  -0.00217   0.01882   0.10371
		0.50000  -0.03905  -0.05021  -0.04800  -0.03515  -0.01438   0.00720   0.02090   0.11479
		0.90000  -0.03302  -0.04955  -0.04848  -0.03514  -0.01384   0.01424   0.05939   0.17022
	    </tableData>

	</table>
    </function>

    <!-- elevator -->
    <function name="aero/CS_elevator_-24">
	<table>
	    <independentVar lookup="row">velocities/mach</independentVar>
	    <independentVar lookup="column">aero/alpha-deg</independentVar>
	    <independentVar lookup="table">aero/beta-deg</independentVar>
	    <tableData breakPoint="-10.00000">
                -10.00     -5.00      0.00      5.00     10.00     15.00     20.00     30.00
		0.20000  -0.04325  -0.03900  -0.03133  -0.02769  -0.01803  -0.01353  -0.00649   0.00668
		0.50000  -0.04613  -0.04097  -0.03333  -0.03130  -0.02046  -0.00862  -0.01151   0.00753
		0.90000  -0.05609  -0.04955  -0.03881  -0.03774  -0.03418  -0.02675  -0.01632   0.01086
	    </tableData>

	    <tableData breakPoint="0.00000">
                -10.00     -5.00      0.00      5.00     10.00     15.00     20.00     30.00
		0.20000   0.00000   0.00000   0.00000   0.00000   0.00000   0.00000   0.00000   0.00000
		0.50000   0.00000   0.00000   0.00000   0.00000   0.00000   0.00000   0.00000   0.00000
		0.90000   0.00000   0.00000   0.00000   0.00000   0.00000   0.00000   0.00000   0.00000
	    </tableData>

	    <tableData breakPoint="10.00000">
                -10.00     -5.00      0.00      5.00     10.00     15.00     20.00     30.00
		0.20000   0.04325   0.03900   0.03133   0.02768   0.01804   0.01354   0.00649  -0.00667
		0.50000   0.04613   0.04073   0.03333   0.03131   0.02045   0.00863   0.01151  -0.00753
		0.90000   0.05609   0.04955   0.03881   0.03774   0.03418   0.02675   0.01632  -0.01085
	    </tableData>

	</table>
    </function>

    <function name="aero/CS_elevator_-9.5">
	<table>
	    <independentVar lookup="row">velocities/mach</independentVar>
	    <independentVar lookup="column">aero/alpha-deg</independentVar>
	    <independentVar lookup="table">aero/beta-deg</independentVar>
	    <tableData breakPoint="-10.00000">
                -10.00     -5.00      0.00      5.00     10.00     15.00     20.00     30.00
		0.20000  -0.01710  -0.01076  -0.00722  -0.00367  -0.00057  -0.00095   0.00488   0.00974
		0.50000  -0.01758  -0.01115  -0.00892  -0.00634   0.00165   0.00266   0.00546   0.01054
		0.90000  -0.02198  -0.01680  -0.01231  -0.00950  -0.00737  -0.00476   0.00032   0.01456
	    </tableData>

	    <tableData breakPoint="0.00000">
                -10.00     -5.00      0.00      5.00     10.00     15.00     20.00     30.00
		0.20000   0.00000   0.00000   0.00000   0.00000   0.00000   0.00000   0.00000   0.00000
		0.50000   0.00000   0.00000   0.00000   0.00000   0.00000   0.00000   0.00000   0.00000
		0.90000   0.00000   0.00000   0.00000   0.00000   0.00000  -0.00000   0.00000   0.00000
	    </tableData>

	    <tableData breakPoint="10.00000">
                -10.00     -5.00      0.00      5.00     10.00     15.00     20.00     30.00
		0.20000   0.01711   0.01076   0.00722   0.00367   0.00058   0.00095  -0.00489  -0.00974
		0.50000   0.01758   0.01115   0.00892   0.00634  -0.00165  -0.00266  -0.00546  -0.01053
		0.90000   0.02198   0.01680   0.01231   0.00950   0.00737   0.00477  -0.00031  -0.01455
	    </tableData>

	</table>
    </function>

    <function name="aero/CS_elevator_1.5">
	<table>
	    <independentVar lookup="row">velocities/mach</independentVar>
	    <independentVar lookup="column">aero/alpha-deg</independentVar>
	    <independentVar lookup="table">aero/beta-deg</independentVar>
	    <tableData breakPoint="-10.00000">
                -10.00     -5.00      0.00      5.00     10.00     15.00     20.00     30.00
		0.20000  -0.00090  -0.00069  -0.00099  -0.00155  -0.00300  -0.00205  -0.00113  -0.00129
		0.50000  -0.00126  -0.00076  -0.00093  -0.00149  -0.00233  -0.00174  -0.00102  -0.00063
	    </tableData>

	    <tableData breakPoint="0.00000">
                -10.00     -5.00      0.00      5.00     10.00     15.00     20.00     30.00
		0.20000   0.00000   0.00000   0.00000   0.00000   0.00000   0.00000   0.00000   0.00000
		0.50000   0.00000   0.00000   0.00000   0.00000   0.00000   0.00000   0.00000   0.00000
	    </tableData>

	    <tableData breakPoint="10.00000">
                -10.00     -5.00      0.00      5.00     10.00     15.00     20.00     30.00
		0.20000   0.00090   0.00069   0.00099   0.00155   0.00300   0.00205   0.00113   0.00129
		0.50000   0.00126   0.00076   0.00093   0.00149   0.00232   0.00174   0.00102   0.00063
	    </tableData>

	</table>
    </function>

    <function name="aero/CS_elevator">
	<product>
	    <property>aero/tune/CS_elevator</property>
	    <interpolate1d>
		<property>fcs/surfaces/elevator-pos-deg</property>
		<value>-24</value> <property>aero/CS_elevator_-24</property>
		<value>-9.5</value> <property>aero/CS_elevator_-9.5</property>
		<value>0</value> <value>0</value>
		<value>1.5</value> <property>aero/CS_elevator_1.5</property>
	    </interpolate1d>
	</product>
    </function>

    <!-- flap -->
    <function name="aero/CS_flap_30">
	<table>
	    <independentVar lookup="row">velocities/mach</independentVar>
	    <independentVar lookup="column">aero/alpha-deg</independentVar>
	    <independentVar lookup="table">aero/beta-deg</independentVar>
	    <tableData breakPoint="-10.00000">
                -10.00     -5.00      0.00      5.00     10.00     15.00     20.00     30.00
		0.20000  -0.00527  -0.01976  -0.03464  -0.04196  -0.03373  -0.03827  -0.03850  -0.04793
		0.50000  -0.00676  -0.02199  -0.03699  -0.03799  -0.04379  -0.03966  -0.05214  -0.04859
		0.90000  -0.00847  -0.02636  -0.04642  -0.06563  -0.06276  -0.06271  -0.07446  -0.07661
	    </tableData>

	    <tableData breakPoint="0.00000">
                -10.00     -5.00      0.00      5.00     10.00     15.00     20.00     30.00
		0.20000   0.00000   0.00000   0.00000   0.00000   0.00000   0.00000   0.00000   0.00000
		0.50000   0.00000   0.00000   0.00000   0.00000   0.00000   0.00000   0.00000   0.00000
		0.90000   0.00000   0.00000   0.00000   0.00000   0.00000   0.00000   0.00000   0.00000
	    </tableData>

	    <tableData breakPoint="10.00000">
                -10.00     -5.00      0.00      5.00     10.00     15.00     20.00     30.00
		0.20000   0.00527   0.01976   0.03464   0.04196   0.03374   0.03826   0.03851   0.04793
		0.50000   0.00676   0.02199   0.03699   0.03799   0.04378   0.03965   0.05215   0.04858
		0.90000   0.00847   0.02636   0.04642   0.06563   0.06275   0.06271   0.07446   0.07661
	    </tableData>

	</table>
    </function>

    <function name="aero/CS_flap_40">
	<table>
	    <independentVar lookup="row">velocities/mach</independentVar>
	    <independentVar lookup="column">aero/alpha-deg</independentVar>
	    <independentVar lookup="table">aero/beta-deg</independentVar>
	    <tableData breakPoint="-10.00000">
                -10.00     -5.00      0.00      5.00     10.00     15.00     20.00     30.00
		0.20000  -0.00937  -0.02751  -0.04390  -0.05141  -0.03694  -0.04779  -0.04418  -0.05676
		0.50000  -0.01154  -0.02817  -0.04812  -0.04467  -0.05206  -0.05355  -0.05717  -0.05468
		0.90000  -0.01542  -0.03675  -0.05818  -0.07937  -0.07292  -0.07912  -0.09326  -0.08756
	    </tableData>

	    <tableData breakPoint="0.00000">
                -10.00     -5.00      0.00      5.00     10.00     15.00     20.00     30.00
		0.20000   0.00000   0.00000   0.00000   0.00000   0.00000   0.00000   0.00000   0.00000
		0.50000   0.00000   0.00000   0.00000   0.00000   0.00000   0.00000   0.00000   0.00000
		0.90000   0.00000   0.00000   0.00000   0.00000   0.00000   0.00000   0.00000   0.00000
	    </tableData>

	    <tableData breakPoint="10.00000">
                -10.00     -5.00      0.00      5.00     10.00     15.00     20.00     30.00
		0.20000   0.00937   0.02751   0.04390   0.05140   0.03694   0.04778   0.04418   0.05675
		0.50000   0.01154   0.02817   0.04813   0.04471   0.05205   0.05354   0.05718   0.05467
		0.90000   0.01542   0.03675   0.05819   0.07936   0.07291   0.07912   0.09326   0.08757
	    </tableData>

	</table>
    </function>

    <function name="aero/CS_flap">
	<product>
	    <property>aero/tune/CS_flap</property>
	    <interpolate1d>
		<property>fcs/surfaces/flap-pos-deg</property>
		<value>0</value> <value>0</value>
		<value>30</value> <property>aero/CS_flap_30</property>
		<value>40</value> <property>aero/CS_flap_40</property>
	    </interpolate1d>
	</product>
    </function>

    <!-- left-flaperon -->
    <function name="aero/CS_left-flaperon_-51">
	<table>
	    <independentVar lookup="row">velocities/mach</independentVar>
	    <independentVar lookup="column">aero/alpha-deg</independentVar>
	    <independentVar lookup="table">aero/beta-deg</independentVar>
	    <tableData breakPoint="-10.00000">
                -5.00      0.00      5.00     10.00     15.00     20.00     30.00
		0.20000   0.01571   0.02472   0.02145   0.01864   0.00635   0.00639   0.01940
		0.50000   0.01294   0.02443   0.02317   0.02006   0.01346   0.00591   0.03117
		0.90000   0.00856   0.02230   0.02493   0.02863   0.02773   0.03352   0.05428
	    </tableData>

	    <tableData breakPoint="0.00000">
                -5.00      0.00      5.00     10.00     15.00     20.00     30.00
		0.20000   0.02067   0.02068   0.01685   0.00689  -0.00150  -0.00310  -0.00271
		0.50000   0.02224   0.02183   0.01806   0.00892  -0.00093  -0.00421  -0.00280
		0.90000   0.02632   0.02654   0.02293   0.01712   0.01093   0.00992   0.01140
	    </tableData>

	    <tableData breakPoint="10.00000">
                -5.00      0.00      5.00     10.00     15.00     20.00     30.00
		0.20000   0.02996   0.02547   0.01480   0.00283  -0.00813  -0.02369  -0.02750
		0.50000   0.03303   0.02767   0.01644   0.00287  -0.01237  -0.01584  -0.02970
		0.90000   0.04595   0.03697   0.02595   0.01399   0.00245  -0.01362  -0.03131
	    </tableData>

	</table>
    </function>

    <function name="aero/CS_left-flaperon">
	<product>
	    <property>aero/tune/CS_left-flaperon</property>
	    <interpolate1d>
		<property>fcs/surfaces/left-flaperon-pos-deg</property>
		<value>-51</value> <property>aero/CS_left-flaperon_-51</property>
		<value>0</value> <value>0</value>
	    </interpolate1d>
	</product>
    </function>

    <!-- right-flaperon -->
    <function name="aero/CS_right-flaperon_-51">
	<table>
	    <independentVar lookup="row">velocities/mach</independentVar>
	    <independentVar lookup="column">aero/alpha-deg</independentVar>
	    <independentVar lookup="table">aero/beta-deg</independentVar>
	    <tableData breakPoint="-10.00000">
                -10.00     -5.00      0.00      5.00     10.00     15.00     20.00     30.00
		0.20000  -0.02792  -0.02562  -0.02043  -0.01170  -0.00054   0.00796   0.02220   0.02587
		0.50000  -0.02947  -0.02794  -0.02242  -0.01246  -0.00034   0.01224   0.01514   0.02840
		0.90000  -0.04310  -0.03988  -0.03096  -0.02137  -0.01073  -0.00038   0.01375   0.02426
	    </tableData>

	    <tableData breakPoint="0.00000">
                -10.00     -5.00      0.00      5.00     10.00     15.00     20.00     30.00
		0.20000  -0.01592  -0.01796  -0.01797  -0.01627  -0.00588   0.00228   0.00378   0.00564
		0.50000  -0.01687  -0.01950  -0.01913  -0.01712  -0.00759   0.00132   0.00378   0.00709
		0.90000  -0.02399  -0.02411  -0.02359  -0.01991  -0.01371  -0.00833  -0.00723  -0.00679
	    </tableData>

	    <tableData breakPoint="10.00000">
                -10.00     -5.00      0.00      5.00     10.00     15.00     20.00     30.00
		0.20000  -0.01075  -0.01512  -0.02176  -0.01992  -0.01588  -0.00545  -0.00394  -0.01233
		0.50000  -0.01134  -0.01329  -0.02179  -0.02166  -0.02025  -0.01162  -0.00402  -0.02229
		0.90000  -0.00755  -0.01274  -0.02303  -0.02460  -0.02581  -0.02398  -0.02720  -0.04239
	    </tableData>

	</table>
    </function>

    <function name="aero/CS_right-flaperon">
	<product>
	    <property>aero/tune/CS_right-flaperon</property>
	    <interpolate1d>
		<property>fcs/surfaces/right-flaperon-pos-deg</property>
		<value>-51</value> <property>aero/CS_right-flaperon_-51</property>
		<value>0</value> <value>0</value>
	    </interpolate1d>
	</product>
    </function>

    <!-- rudder -->
    <function name="aero/CS_rudder_-35">
	<table>
	    <independentVar lookup="row">velocities/mach</independentVar>
	    <independentVar lookup="column">aero/alpha-deg</independentVar>
	    <independentVar lookup="table">aero/beta-deg</independentVar>
	    <tableData breakPoint="-10.00000">
                -10.00     -5.00      0.00      5.00     10.00     15.00     20.00     30.00
		0.20000  -0.07330  -0.07302  -0.07242  -0.06890  -0.07147  -0.06405  -0.05835  -0.05112
		0.50000  -0.07644  -0.07628  -0.07678  -0.07353  -0.06915  -0.06417  -0.06608  -0.05107
		0.90000  -0.08499  -0.08878  -0.08885  -0.08869  -0.08402  -0.08335  -0.07805  -0.06519
	    </tableData>

	    <tableData breakPoint="0.00000">
                -10.00     -5.00      0.00      5.00     10.00     15.00     20.00     30.00
		0.20000  -0.06740  -0.06970  -0.06654  -0.06921  -0.05932  -0.05810  -0.04466  -0.04338
		0.50000  -0.06958  -0.07157  -0.06995  -0.06975  -0.06268  -0.06213  -0.04839  -0.04888
		0.90000  -0.08065  -0.08309  -0.08446  -0.08453  -0.07386  -0.07020  -0.06743  -0.06286
	    </tableData>

	    <tableData breakPoint="10.00000">
                -10.00     -5.00      0.00      5.00     10.00     15.00     20.00     30.00
		0.20000  -0.06864  -0.06985  -0.06546  -0.06487  -0.06162  -0.05646  -0.07829  -0.04466
		0.50000  -0.07067  -0.07273  -0.06917  -0.06647  -0.06710  -0.06079  -0.05765  -0.04788
		0.90000  -0.07571  -0.07794  -0.07638  -0.07676  -0.07209  -0.06833  -0.05962  -0.05381
	    </tableData>

	</table>
    </function>

    <function name="aero/CS_rudder_4">
	<table>
	    <independentVar lookup="row">velocities/mach</independentVar>
	    <independentVar lookup="column">aero/alpha-deg</independentVar>
	    <independentVar lookup="table">aero/beta-deg</independentVar>
	    <tableData breakPoint="-10.00000">
                -10.00     -5.00      0.00      5.00     10.00     15.00     20.00     30.00
		0.20000   0.01050   0.01034   0.00990   0.00987   0.00975   0.00772   0.00849   0.00644
		0.50000   0.01058   0.01076   0.01046   0.01021   0.01093   0.00945   0.01040   0.00710
		0.90000   0.01175   0.01194   0.01177   0.01196   0.01117   0.01036   0.00966   0.00806
	    </tableData>

	    <tableData breakPoint="0.00000">
                -10.00     -5.00      0.00      5.00     10.00     15.00     20.00     30.00
		0.20000   0.01003   0.00981   0.00972   0.01028   0.00734   0.01045   0.00600   0.00555
		0.50000   0.01052   0.01012   0.01020   0.01002   0.00633   0.01021   0.00802   0.00699
		0.90000   0.01171   0.01210   0.01216   0.01237   0.01156   0.01106   0.00902   0.00910
	    </tableData>

	    <tableData breakPoint="10.00000">
                -10.00     -5.00      0.00      5.00     10.00     15.00     20.00     30.00
		0.20000   0.01077   0.01040   0.01013   0.00957   0.00859   0.00845   0.00907   0.00718
		0.50000   0.01066   0.01090   0.01069   0.01024   0.01297   0.00877   0.00948   0.00647
		0.90000   0.01174   0.01216   0.01204   0.01217   0.01146   0.01165   0.01088   0.00881
	    </tableData>

	</table>
    </function>

    <function name="aero/CS_rudder_-4">
	<table>
	    <independentVar lookup="row">velocities/mach</independentVar>
	    <independentVar lookup="column">aero/alpha-deg</independentVar>
	    <independentVar lookup="table">aero/beta-deg</independentVar>
	    <tableData breakPoint="-10.00000">
                -10.00     -5.00      0.00      5.00     10.00     15.00     20.00     30.00
		0.20000  -0.01077  -0.01040  -0.01013  -0.00957  -0.00858  -0.00845  -0.00907  -0.00717
		0.50000  -0.01066  -0.01090  -0.01069  -0.01025  -0.01297  -0.00877  -0.00948  -0.00648
		0.90000  -0.01174  -0.01216  -0.01204  -0.01218  -0.01146  -0.01164  -0.01088  -0.00880
	    </tableData>

	    <tableData breakPoint="0.00000">
                -10.00     -5.00      0.00      5.00     10.00     15.00     20.00     30.00
		0.20000  -0.01003  -0.00981  -0.00972  -0.01028  -0.00734  -0.01045  -0.00601  -0.00555
		0.50000  -0.01052  -0.01012  -0.01020  -0.01002  -0.00634  -0.01022  -0.00803  -0.00699
		0.90000  -0.01171  -0.01210  -0.01216  -0.01238  -0.01156  -0.01106  -0.00903  -0.00910
	    </tableData>

	    <tableData breakPoint="10.00000">
                -10.00     -5.00      0.00      5.00     10.00     15.00     20.00     30.00
		0.20000  -0.01050  -0.01034  -0.00990  -0.00987  -0.00974  -0.00771  -0.00848  -0.00643
		0.50000  -0.01058  -0.01076  -0.01046  -0.01021  -0.01093  -0.00944  -0.01040  -0.00711
		0.90000  -0.01175  -0.01194  -0.01177  -0.01196  -0.01117  -0.01035  -0.00966  -0.00806
	    </tableData>

	</table>
    </function>

    <function name="aero/CS_rudder_35">
	<table>
	    <independentVar lookup="row">velocities/mach</independentVar>
	    <independentVar lookup="column">aero/alpha-deg</independentVar>
	    <independentVar lookup="table">aero/beta-deg</independentVar>
	    <tableData breakPoint="-10.00000">
                -10.00     -5.00      0.00      5.00     10.00     15.00     20.00     30.00
		0.20000   0.06864   0.06985   0.06546   0.06488   0.06163   0.05647   0.07830   0.04467
		0.50000   0.07067   0.07273   0.06917   0.06647   0.06710   0.06080   0.05767   0.04788
		0.90000   0.07571   0.07794   0.07638   0.07676   0.07209   0.06834   0.05961   0.05382
	    </tableData>

	    <tableData breakPoint="0.00000">
                -10.00     -5.00      0.00      5.00     10.00     15.00     20.00     30.00
		0.20000   0.06740   0.06970   0.06654   0.06921   0.05932   0.05809   0.04466   0.04338
		0.50000   0.06958   0.07157   0.06995   0.06975   0.06263   0.06212   0.04838   0.04888
		0.90000   0.08065   0.08309   0.08446   0.08453   0.07386   0.07019   0.06743   0.06284
	    </tableData>

	    <tableData breakPoint="10.00000">
                -10.00     -5.00      0.00      5.00     10.00     15.00     20.00     30.00
		0.20000   0.07330   0.07302   0.07242   0.06890   0.07148   0.06405   0.05835   0.05112
		0.50000   0.07644   0.07628   0.07678   0.07352   0.06915   0.06417   0.06608   0.05107
		0.90000   0.08499   0.08878   0.08885   0.08869   0.08402   0.08336   0.07804   0.06519
	    </tableData>

	</table>
    </function>

    <function name="aero/CS_rudder">
	<product>
	    <property>aero/tune/CS_rudder</property>
	    <interpolate1d>
		<property>fcs/surfaces/rudder-pos-deg</property>
		<value>-35</value> <property>aero/CS_rudder_-35</property>
		<value>-4</value> <property>aero/CS_rudder_-4</property>
		<value>0</value> <value>0</value>
		<value>4</value> <property>aero/CS_rudder_4</property>
		<value>35</value> <property>aero/CS_rudder_35</property>
	    </interpolate1d>
	</product>
    </function>

    <!-- slats -->
    <function name="aero/CS_slats_27.5">
	<table>
	    <independentVar lookup="row">velocities/mach</independentVar>
	    <independentVar lookup="column">aero/alpha-deg</independentVar>
	    <independentVar lookup="table">aero/beta-deg</independentVar>
	    <tableData breakPoint="-10.00000">
                -10.00     -5.00      0.00      5.00     10.00     15.00     20.00     30.00
		0.20000  -0.02266  -0.01015   0.00280   0.01686   0.03064   0.04453   0.05655   0.07629
		0.50000  -0.02406  -0.01096   0.00281   0.01764   0.03245   0.04688   0.05966   0.08068
		0.90000  -0.03216  -0.01540   0.00237   0.02072   0.03846   0.05692   0.07349   0.10032
	    </tableData>

	    <tableData breakPoint="0.00000">
                -10.00     -5.00      0.00      5.00     10.00     15.00     20.00     30.00
		0.20000  -0.01854  -0.00869   0.00173   0.01259   0.02346   0.03409   0.04409   0.06110
		0.50000  -0.01980  -0.00936   0.00169   0.01322   0.02461   0.03613   0.04666   0.06436
		0.90000  -0.02577  -0.01278   0.00093   0.01537   0.03000   0.04429   0.05779   0.08055
	    </tableData>

	    <tableData breakPoint="10.00000">
                -10.00     -5.00      0.00      5.00     10.00     15.00     20.00     30.00
		0.20000  -0.01205  -0.00592   0.00066   0.00713   0.01410   0.02116   0.02754   0.03985
		0.50000  -0.01292  -0.00634   0.00058   0.00768   0.01512   0.02194   0.02935   0.04203
		0.90000  -0.01650  -0.00845   0.00010   0.00893   0.01888   0.02771   0.03701   0.05351
	    </tableData>

	</table>
    </function>

    <function name="aero/CS_slats">
	<product>
	    <property>aero/tune/CS_slats</property>
	    <interpolate1d>
		<property>fcs/surfaces/slats-pos-deg</property>
		<value>0</value> <value>0</value>
		<value>27.5</value> <property>aero/CS_slats_27.5</property>
	    </interpolate1d>
	</product>
    </function>

    <!-- speedbrake -->
    <function name="aero/CS_speedbrake_60">
	<table>
	    <independentVar lookup="row">velocities/mach</independentVar>
	    <independentVar lookup="column">aero/alpha-deg</independentVar>
	    <independentVar lookup="table">aero/beta-deg</independentVar>
	    <tableData breakPoint="-10.00000">
                -10.00     -5.00      0.00      5.00     10.00     15.00     20.00     30.00
		0.20000  -0.03269  -0.02291  -0.01350  -0.00312   0.00826   0.01870   0.02947   0.04895
		0.50000  -0.03449  -0.02476  -0.01472  -0.00327   0.01004   0.02131   0.03138   0.05237
	    </tableData>

	    <tableData breakPoint="0.00000">
                -10.00     -5.00      0.00      5.00     10.00     15.00     20.00     30.00
		0.20000  -0.02778  -0.02154  -0.01309  -0.00444   0.00494   0.01803   0.02568   0.04082
		0.50000  -0.02984  -0.02301  -0.01402  -0.00474   0.00640   0.01847   0.02839   0.04177
	    </tableData>

	    <tableData breakPoint="10.00000">
                -10.00     -5.00      0.00      5.00     10.00     15.00     20.00     30.00
		0.20000  -0.02002  -0.01552  -0.00927  -0.00255   0.00274   0.01286   0.01764   0.02646
		0.50000  -0.02129  -0.01630  -0.01008  -0.00232   0.00382   0.00812   0.01767   0.02536
	    </tableData>

	</table>
    </function>

    <function name="aero/CS_speedbrake">
	<product>
	    <property>aero/tune/CS_speedbrake</property>
	    <interpolate1d>
		<property>fcs/surfaces/speedbrake-pos-deg</property>
		<value>0</value> <value>0</value>
		<value>60</value> <property>aero/CS_speedbrake_60</property>
	    </interpolate1d>
	</product>
    </function>

    <!-- CMX -->
    <!-- base -->
    <function name="aero/CMx_base">
	<table>
	    <independentVar lookup="row">velocities/mach</independentVar>
	    <independentVar lookup="column">aero/alpha-deg</independentVar>
	    <independentVar lookup="table">aero/beta-deg</independentVar>
	    <tableData breakPoint="-10.00000">
                -10.00     -5.00      0.00      5.00     10.00     15.00     20.00     30.00
		0.20000   0.01067   0.00303  -0.00558  -0.01065  -0.01678  -0.02256  -0.02903  -0.03520
		0.50000   0.01191   0.00347  -0.00613  -0.01183  -0.01839  -0.02444  -0.03042  -0.03751
		0.90000   0.01640   0.00523  -0.00734  -0.01596  -0.02407  -0.03265  -0.03926  -0.04408
	    </tableData>

	    <tableData breakPoint="0.00000">
                -10.00     -5.00      0.00      5.00     10.00     15.00     20.00     30.00
		0.20000  -0.00000   0.00000  -0.00000   0.00000   0.00000   0.00000   0.00000   0.00000
		0.50000  -0.00000  -0.00000  -0.00000   0.00000   0.00000   0.00000   0.00000   0.00000
		0.90000  -0.00000   0.00000   0.00000  -0.00000   0.00000   0.00000   0.00000   0.00000
	    </tableData>

	    <tableData breakPoint="10.00000">
                -10.00     -5.00      0.00      5.00     10.00     15.00     20.00     30.00
		0.20000  -0.01067  -0.00303   0.00558   0.01065   0.01678   0.02256   0.02903   0.03520
		0.50000  -0.01191  -0.00347   0.00613   0.01183   0.01839   0.02444   0.03042   0.03751
		0.90000  -0.01640  -0.00523   0.00734   0.01596   0.02407   0.03265   0.03926   0.04408
	    </tableData>

	</table>
    </function>

    <!-- elevator -->
    <function name="aero/CMx_elevator_-24">
	<table>
	    <independentVar lookup="row">velocities/mach</independentVar>
	    <independentVar lookup="column">aero/alpha-deg</independentVar>
	    <independentVar lookup="table">aero/beta-deg</independentVar>
	    <tableData breakPoint="-10.00000">
                -10.00     -5.00      0.00      5.00     10.00     15.00     20.00     30.00
		0.20000   0.00436   0.00431   0.00487   0.00256   0.00208   0.00341   0.00437   0.00421
		0.50000   0.00459   0.00442   0.00519   0.00233   0.00169   0.00375   0.00447   0.00449
		0.90000   0.00566   0.00521   0.00722   0.00120   0.00308   0.00499   0.00604   0.00519
	    </tableData>

	    <tableData breakPoint="0.00000">
                -10.00     -5.00      0.00      5.00     10.00     15.00     20.00     30.00
		0.20000   0.00000   0.00000   0.00000   0.00000  -0.00000   0.00000   0.00000   0.00000
		0.50000   0.00000   0.00000   0.00000   0.00000  -0.00000   0.00000   0.00000   0.00000
		0.90000   0.00000   0.00000   0.00000   0.00000  -0.00000   0.00000   0.00000   0.00000
	    </tableData>

	    <tableData breakPoint="10.00000">
                -10.00     -5.00      0.00      5.00     10.00     15.00     20.00     30.00
		0.20000  -0.00436  -0.00431  -0.00487  -0.00256  -0.00208  -0.00341  -0.00436  -0.00421
		0.50000  -0.00459  -0.00442  -0.00519  -0.00233  -0.00168  -0.00374  -0.00446  -0.00449
		0.90000  -0.00566  -0.00521  -0.00722  -0.00120  -0.00308  -0.00499  -0.00604  -0.00519
	    </tableData>

	</table>
    </function>

    <function name="aero/CMx_elevator_-9.5">
	<table>
	    <independentVar lookup="row">velocities/mach</independentVar>
	    <independentVar lookup="column">aero/alpha-deg</independentVar>
	    <independentVar lookup="table">aero/beta-deg</independentVar>
	    <tableData breakPoint="-10.00000">
                -10.00     -5.00      0.00      5.00     10.00     15.00     20.00     30.00
		0.20000   0.00243   0.00214   0.00264   0.00044   0.00200   0.00192   0.00187   0.00204
		0.50000   0.00255   0.00218   0.00283  -0.00019   0.00194   0.00229   0.00195   0.00226
		0.90000   0.00308   0.00289   0.00345   0.00177   0.00240   0.00327   0.00254   0.00297
	    </tableData>

	    <tableData breakPoint="0.00000">
                -10.00     -5.00      0.00      5.00     10.00     15.00     20.00     30.00
		0.20000   0.00000   0.00000   0.00000   0.00000   0.00000   0.00000   0.00000   0.00000
		0.50000   0.00000   0.00000   0.00000   0.00000   0.00000   0.00000   0.00000   0.00000
		0.90000   0.00000   0.00000   0.00000   0.00000   0.00000   0.00000   0.00000   0.00000
	    </tableData>

	    <tableData breakPoint="10.00000">
                -10.00     -5.00      0.00      5.00     10.00     15.00     20.00     30.00
		0.20000  -0.00244  -0.00214  -0.00264  -0.00044  -0.00199  -0.00192  -0.00186  -0.00204
		0.50000  -0.00255  -0.00218  -0.00283   0.00019  -0.00194  -0.00228  -0.00195  -0.00226
		0.90000  -0.00308  -0.00289  -0.00345  -0.00177  -0.00240  -0.00327  -0.00254  -0.00297
	    </tableData>

	</table>
    </function>

    <function name="aero/CMx_elevator_1.5">
	<table>
	    <independentVar lookup="row">velocities/mach</independentVar>
	    <independentVar lookup="column">aero/alpha-deg</independentVar>
	    <independentVar lookup="table">aero/beta-deg</independentVar>
	    <tableData breakPoint="-10.00000">
                -10.00     -5.00      0.00      5.00     10.00     15.00     20.00     30.00
		0.20000  -0.00018  -0.00025  -0.00010  -0.00023  -0.00021  -0.00030  -0.00038  -0.00029
		0.50000  -0.00014  -0.00025  -0.00013  -0.00025  -0.00027   0.00000  -0.00030  -0.00017
	    </tableData>

	    <tableData breakPoint="0.00000">
                -10.00     -5.00      0.00      5.00     10.00     15.00     20.00     30.00
		0.20000   0.00000   0.00000   0.00000   0.00000   0.00000   0.00000   0.00000   0.00000
		0.50000   0.00000   0.00000   0.00000   0.00000   0.00000   0.00000   0.00000   0.00000
	    </tableData>

	    <tableData breakPoint="10.00000">
                -10.00     -5.00      0.00      5.00     10.00     15.00     20.00     30.00
		0.20000   0.00018   0.00025   0.00010   0.00024   0.00021   0.00030   0.00038   0.00029
		0.50000   0.00014   0.00025   0.00013   0.00025   0.00027   0.00000   0.00031   0.00017
	    </tableData>

	</table>
    </function>

    <function name="aero/CMx_elevator">
	<product>
	    <property>aero/tune/CMx_elevator</property>
	    <interpolate1d>
		<property>fcs/surfaces/elevator-pos-deg</property>
		<value>-24</value> <property>aero/CMx_elevator_-24</property>
		<value>-9.5</value> <property>aero/CMx_elevator_-9.5</property>
		<value>0</value> <value>0</value>
		<value>1.5</value> <property>aero/CMx_elevator_1.5</property>
	    </interpolate1d>
	</product>
    </function>

    <!-- flap -->
    <function name="aero/CMx_flap_30">
	<table>
	    <independentVar lookup="row">velocities/mach</independentVar>
	    <independentVar lookup="column">aero/alpha-deg</independentVar>
	    <independentVar lookup="table">aero/beta-deg</independentVar>
	    <tableData breakPoint="-10.00000">
                -10.00     -5.00      0.00      5.00     10.00     15.00     20.00     30.00
		0.20000  -0.01539  -0.01496  -0.00917  -0.00652  -0.00603  -0.00644  -0.00710  -0.00664
		0.50000  -0.01739  -0.01682  -0.01092  -0.00738  -0.00666  -0.00724  -0.00718  -0.00737
		0.90000  -0.01952  -0.01823  -0.01431  -0.01066  -0.00995  -0.00838  -0.00761  -0.00749
	    </tableData>

	    <tableData breakPoint="0.00000">
                -10.00     -5.00      0.00      5.00     10.00     15.00     20.00     30.00
		0.20000   0.00000   0.00000   0.00000   0.00000   0.00000   0.00000   0.00000   0.00000
		0.50000   0.00000   0.00000   0.00000   0.00000   0.00000   0.00000   0.00000   0.00000
		0.90000   0.00000   0.00000   0.00000   0.00000   0.00000   0.00000   0.00000   0.00000
	    </tableData>

	    <tableData breakPoint="10.00000">
                -10.00     -5.00      0.00      5.00     10.00     15.00     20.00     30.00
		0.20000   0.01539   0.01496   0.00917   0.00653   0.00604   0.00645   0.00710   0.00664
		0.50000   0.01739   0.01682   0.01092   0.00738   0.00666   0.00725   0.00718   0.00737
		0.90000   0.01952   0.01823   0.01431   0.01066   0.00996   0.00839   0.00761   0.00749
	    </tableData>

	</table>
    </function>

    <function name="aero/CMx_flap_40">
	<table>
	    <independentVar lookup="row">velocities/mach</independentVar>
	    <independentVar lookup="column">aero/alpha-deg</independentVar>
	    <independentVar lookup="table">aero/beta-deg</independentVar>
	    <tableData breakPoint="-10.00000">
                -10.00     -5.00      0.00      5.00     10.00     15.00     20.00     30.00
		0.20000  -0.01815  -0.01730  -0.01017  -0.00727  -0.00710  -0.00769  -0.00786  -0.00761
		0.50000  -0.02030  -0.01961  -0.01247  -0.00844  -0.00778  -0.00780  -0.00808  -0.00835
		0.90000  -0.02292  -0.02059  -0.01631  -0.01241  -0.01133  -0.00945  -0.00837  -0.00818
	    </tableData>

	    <tableData breakPoint="0.00000">
                -10.00     -5.00      0.00      5.00     10.00     15.00     20.00     30.00
		0.20000   0.00000   0.00000   0.00000   0.00000   0.00000   0.00000   0.00000   0.00000
		0.50000   0.00000   0.00000   0.00000   0.00000   0.00000   0.00000   0.00000   0.00000
		0.90000   0.00000  -0.00000   0.00000   0.00000   0.00000   0.00000   0.00000   0.00000
	    </tableData>

	    <tableData breakPoint="10.00000">
                -10.00     -5.00      0.00      5.00     10.00     15.00     20.00     30.00
		0.20000   0.01815   0.01730   0.01017   0.00728   0.00710   0.00771   0.00786   0.00761
		0.50000   0.02030   0.01961   0.01247   0.00844   0.00779   0.00781   0.00808   0.00835
		0.90000   0.02292   0.02059   0.01631   0.01241   0.01134   0.00946   0.00837   0.00818
	    </tableData>

	</table>
    </function>

    <function name="aero/CMx_flap">
	<product>
	    <property>aero/tune/CMx_flap</property>
	    <interpolate1d>
		<property>fcs/surfaces/flap-pos-deg</property>
		<value>0</value> <value>0</value>
		<value>30</value> <property>aero/CMx_flap_30</property>
		<value>40</value> <property>aero/CMx_flap_40</property>
	    </interpolate1d>
	</product>
    </function>

    <!-- left-flaperon -->
    <function name="aero/CMx_left-flaperon_-51">
	<table>
	    <independentVar lookup="row">velocities/mach</independentVar>
	    <independentVar lookup="column">aero/alpha-deg</independentVar>
	    <independentVar lookup="table">aero/beta-deg</independentVar>
	    <tableData breakPoint="-10.00000">
                -5.00      0.00      5.00     10.00     15.00     20.00     30.00
		0.20000   0.08324   0.08562   0.08655   0.08660   0.08577   0.08420   0.07535
		0.50000   0.08949   0.09266   0.09351   0.09350   0.09216   0.08984   0.08014
		0.90000   0.12153   0.13105   0.12977   0.13105   0.12954   0.12482   0.10848
	    </tableData>

	    <tableData breakPoint="0.00000">
                -5.00      0.00      5.00     10.00     15.00     20.00     30.00
		0.20000   0.07836   0.07998   0.08174   0.08241   0.08180   0.07914   0.06974
		0.50000   0.08379   0.08583   0.08771   0.08846   0.08760   0.08468   0.07431
		0.90000   0.11741   0.12084   0.12352   0.12485   0.12343   0.11876   0.10306
	    </tableData>

	    <tableData breakPoint="10.00000">
                -5.00      0.00      5.00     10.00     15.00     20.00     30.00
		0.20000   0.07038   0.07141   0.07451   0.07535   0.07475   0.07270   0.06304
		0.50000   0.07493   0.07603   0.07945   0.08041   0.07955   0.07766   0.06648
		0.90000   0.10654   0.10896   0.11231   0.11414   0.11240   0.10893   0.09441
	    </tableData>

	</table>
    </function>

    <function name="aero/CMx_left-flaperon">
	<product>
	    <property>aero/tune/CMx_left-flaperon</property>
	    <interpolate1d>
		<property>fcs/surfaces/left-flaperon-pos-deg</property>
		<value>-51</value> <property>aero/CMx_left-flaperon_-51</property>
		<value>0</value> <value>0</value>
	    </interpolate1d>
	</product>
    </function>

    <!-- right-flaperon -->
    <function name="aero/CMx_right-flaperon_-51">
	<table>
	    <independentVar lookup="row">velocities/mach</independentVar>
	    <independentVar lookup="column">aero/alpha-deg</independentVar>
	    <independentVar lookup="table">aero/beta-deg</independentVar>
	    <tableData breakPoint="-10.00000">
                -10.00     -5.00      0.00      5.00     10.00     15.00     20.00     30.00
		0.20000  -0.06004  -0.06076  -0.06192  -0.06509  -0.06590  -0.06554  -0.06402  -0.05636
		0.50000  -0.06416  -0.06480  -0.06608  -0.06959  -0.07051  -0.06996  -0.06855  -0.05949
		0.90000  -0.09109  -0.09404  -0.09675  -0.10001  -0.10191  -0.10051  -0.09778  -0.08521
	    </tableData>

	    <tableData breakPoint="0.00000">
                -10.00     -5.00      0.00      5.00     10.00     15.00     20.00     30.00
		0.20000  -0.06524  -0.06736  -0.06874  -0.07048  -0.07108  -0.07071  -0.06852  -0.06088
		0.50000  -0.07008  -0.07225  -0.07389  -0.07573  -0.07642  -0.07578  -0.07342  -0.06508
		0.90000  -0.09957  -0.10308  -0.10609  -0.10859  -0.10988  -0.10877  -0.10477  -0.09134
	    </tableData>

	    <tableData breakPoint="10.00000">
                -10.00     -5.00      0.00      5.00     10.00     15.00     20.00     30.00
		0.20000  -0.06838  -0.07123  -0.07339  -0.07320  -0.07364  -0.07300  -0.07187  -0.06456
		0.50000  -0.07402  -0.07668  -0.07965  -0.07930  -0.07957  -0.07865  -0.07675  -0.06865
		0.90000  -0.10324  -0.10650  -0.11514  -0.11282  -0.11377  -0.11283  -0.10853  -0.09448
	    </tableData>

	</table>
    </function>

    <function name="aero/CMx_right-flaperon">
	<product>
	    <property>aero/tune/CMx_right-flaperon</property>
	    <interpolate1d>
		<property>fcs/surfaces/right-flaperon-pos-deg</property>
		<value>-51</value> <property>aero/CMx_right-flaperon_-51</property>
		<value>0</value> <value>0</value>
	    </interpolate1d>
	</product>
    </function>

    <!-- rudder -->
    <function name="aero/CMx_rudder_-35">
	<table>
	    <independentVar lookup="row">velocities/mach</independentVar>
	    <independentVar lookup="column">aero/alpha-deg</independentVar>
	    <independentVar lookup="table">aero/beta-deg</independentVar>
	    <tableData breakPoint="-10.00000">
                -10.00     -5.00      0.00      5.00     10.00     15.00     20.00     30.00
		0.20000   0.00614   0.00553   0.00519   0.00389   0.00329   0.00236   0.00199   0.00115
		0.50000   0.00636   0.00576   0.00529   0.00428   0.00354   0.00273   0.00230   0.00152
		0.90000   0.00721   0.00676   0.00524   0.00596   0.00551   0.00517   0.00517   0.00359
	    </tableData>

	    <tableData breakPoint="0.00000">
                -10.00     -5.00      0.00      5.00     10.00     15.00     20.00     30.00
		0.20000   0.00608   0.00563   0.00493   0.00422   0.00277   0.00161   0.00043   0.00029
		0.50000   0.00623   0.00575   0.00523   0.00438   0.00322   0.00206   0.00109   0.00075
		0.90000   0.00704   0.00656   0.00702   0.00559   0.00546   0.00441   0.00405   0.00344
	    </tableData>

	    <tableData breakPoint="10.00000">
                -10.00     -5.00      0.00      5.00     10.00     15.00     20.00     30.00
		0.20000   0.00572   0.00522   0.00554   0.00359   0.00284   0.00250   0.00259   0.00091
		0.50000   0.00581   0.00545   0.00525   0.00396   0.00306   0.00291   0.00205   0.00101
		0.90000   0.00631   0.00596   0.00531   0.00488   0.00472   0.00414   0.00475   0.00291
	    </tableData>

	</table>
    </function>

    <function name="aero/CMx_rudder_4">
	<table>
	    <independentVar lookup="row">velocities/mach</independentVar>
	    <independentVar lookup="column">aero/alpha-deg</independentVar>
	    <independentVar lookup="table">aero/beta-deg</independentVar>
	    <tableData breakPoint="-10.00000">
                -10.00     -5.00      0.00      5.00     10.00     15.00     20.00     30.00
		0.20000  -0.00091  -0.00078  -0.00083  -0.00054  -0.00055  -0.00026  -0.00030  -0.00013
		0.50000  -0.00088  -0.00081  -0.00076  -0.00061  -0.00051  -0.00033  -0.00036  -0.00017
		0.90000  -0.00097  -0.00092  -0.00080  -0.00073  -0.00077  -0.00058  -0.00081  -0.00042
	    </tableData>

	    <tableData breakPoint="0.00000">
                -10.00     -5.00      0.00      5.00     10.00     15.00     20.00     30.00
		0.20000  -0.00088  -0.00079  -0.00077  -0.00063  -0.00035  -0.00017  -0.00011  -0.00000
		0.50000  -0.00090  -0.00081  -0.00078  -0.00065  -0.00038  -0.00022  -0.00018   0.00000
		0.90000  -0.00103  -0.00095  -0.00102  -0.00071  -0.00087  -0.00069  -0.00061  -0.00048
	    </tableData>

	    <tableData breakPoint="10.00000">
                -10.00     -5.00      0.00      5.00     10.00     15.00     20.00     30.00
		0.20000  -0.00091  -0.00079  -0.00078  -0.00052  -0.00045  -0.00023  -0.00023  -0.00018
		0.50000  -0.00089  -0.00079  -0.00077  -0.00058  -0.00047  -0.00029  -0.00030  -0.00018
		0.90000  -0.00100  -0.00093  -0.00082  -0.00079  -0.00082  -0.00075  -0.00070  -0.00047
	    </tableData>

	</table>
    </function>

    <function name="aero/CMx_rudder_-4">
	<table>
	    <independentVar lookup="row">velocities/mach</independentVar>
	    <independentVar lookup="column">aero/alpha-deg</independentVar>
	    <independentVar lookup="table">aero/beta-deg</independentVar>
	    <tableData breakPoint="-10.00000">
                -10.00     -5.00      0.00      5.00     10.00     15.00     20.00     30.00
		0.20000   0.00091   0.00079   0.00078   0.00052   0.00045   0.00023   0.00024   0.00018
		0.50000   0.00089   0.00079   0.00077   0.00059   0.00047   0.00030   0.00030   0.00018
		0.90000   0.00100   0.00093   0.00082   0.00079   0.00082   0.00075   0.00070   0.00047
	    </tableData>

	    <tableData breakPoint="0.00000">
                -10.00     -5.00      0.00      5.00     10.00     15.00     20.00     30.00
		0.20000   0.00088   0.00079   0.00077   0.00063   0.00035   0.00017   0.00012   0.00000
		0.50000   0.00090   0.00081   0.00078   0.00065   0.00038   0.00022   0.00018   0.00000
		0.90000   0.00103   0.00095   0.00102   0.00071   0.00088   0.00069   0.00061   0.00048
	    </tableData>

	    <tableData breakPoint="10.00000">
                -10.00     -5.00      0.00      5.00     10.00     15.00     20.00     30.00
		0.20000   0.00091   0.00078   0.00083   0.00054   0.00055   0.00027   0.00030   0.00013
		0.50000   0.00088   0.00081   0.00076   0.00061   0.00051   0.00033   0.00037   0.00017
		0.90000   0.00097   0.00092   0.00080   0.00073   0.00077   0.00058   0.00081   0.00042
	    </tableData>

	</table>
    </function>

    <function name="aero/CMx_rudder_35">
	<table>
	    <independentVar lookup="row">velocities/mach</independentVar>
	    <independentVar lookup="column">aero/alpha-deg</independentVar>
	    <independentVar lookup="table">aero/beta-deg</independentVar>
	    <tableData breakPoint="-10.00000">
                -10.00     -5.00      0.00      5.00     10.00     15.00     20.00     30.00
		0.20000  -0.00572  -0.00522  -0.00554  -0.00359  -0.00284  -0.00250  -0.00258  -0.00091
		0.50000  -0.00581  -0.00545  -0.00525  -0.00396  -0.00306  -0.00291  -0.00204  -0.00101
		0.90000  -0.00631  -0.00596  -0.00532  -0.00488  -0.00472  -0.00414  -0.00474  -0.00291
	    </tableData>

	    <tableData breakPoint="0.00000">
                -10.00     -5.00      0.00      5.00     10.00     15.00     20.00     30.00
		0.20000  -0.00608  -0.00563  -0.00493  -0.00422  -0.00276  -0.00161  -0.00043  -0.00029
		0.50000  -0.00623  -0.00575  -0.00523  -0.00438  -0.00325  -0.00206  -0.00109  -0.00075
		0.90000  -0.00704  -0.00656  -0.00702  -0.00559  -0.00546  -0.00441  -0.00404  -0.00344
	    </tableData>

	    <tableData breakPoint="10.00000">
                -10.00     -5.00      0.00      5.00     10.00     15.00     20.00     30.00
		0.20000  -0.00615  -0.00553  -0.00519  -0.00389  -0.00329  -0.00236  -0.00199  -0.00115
		0.50000  -0.00636  -0.00576  -0.00529  -0.00428  -0.00354  -0.00272  -0.00230  -0.00151
		0.90000  -0.00721  -0.00676  -0.00523  -0.00596  -0.00551  -0.00517  -0.00517  -0.00359
	    </tableData>

	</table>
    </function>

    <function name="aero/CMx_rudder">
	<product>
	    <property>aero/tune/CMx_rudder</property>
	    <interpolate1d>
		<property>fcs/surfaces/rudder-pos-deg</property>
		<value>-35</value> <property>aero/CMx_rudder_-35</property>
		<value>-4</value> <property>aero/CMx_rudder_-4</property>
		<value>0</value> <value>0</value>
		<value>4</value> <property>aero/CMx_rudder_4</property>
		<value>35</value> <property>aero/CMx_rudder_35</property>
	    </interpolate1d>
	</product>
    </function>

    <!-- slats -->
    <function name="aero/CMx_slats_27.5">
	<table>
	    <independentVar lookup="row">velocities/mach</independentVar>
	    <independentVar lookup="column">aero/alpha-deg</independentVar>
	    <independentVar lookup="table">aero/beta-deg</independentVar>
	    <tableData breakPoint="-10.00000">
                -10.00     -5.00      0.00      5.00     10.00     15.00     20.00     30.00
		0.20000   0.00031  -0.00090  -0.00132  -0.00057   0.00131   0.00410   0.00750   0.01465
		0.50000   0.00044  -0.00083  -0.00124  -0.00051   0.00148   0.00445   0.00809   0.01569
		0.90000   0.00164  -0.00011  -0.00063   0.00027   0.00270   0.00649   0.01122   0.02107
	    </tableData>

	    <tableData breakPoint="0.00000">
                -10.00     -5.00      0.00      5.00     10.00     15.00     20.00     30.00
		0.20000   0.00027  -0.00129  -0.00167  -0.00076   0.00142   0.00470   0.00875   0.01735
		0.50000   0.00041  -0.00125  -0.00165  -0.00071   0.00162   0.00511   0.00943   0.01861
		0.90000   0.00148  -0.00063  -0.00121   0.00000   0.00286   0.00735   0.01294   0.02488
	    </tableData>

	    <tableData breakPoint="10.00000">
                -10.00     -5.00      0.00      5.00     10.00     15.00     20.00     30.00
		0.20000   0.00000  -0.00163  -0.00196  -0.00103   0.00123   0.00464   0.00894   0.01796
		0.50000   0.00010  -0.00163  -0.00203  -0.00100   0.00145   0.00507   0.00956   0.01931
		0.90000   0.00102  -0.00121  -0.00177  -0.00051   0.00258   0.00732   0.01320   0.02590
	    </tableData>

	</table>
    </function>

    <function name="aero/CMx_slats">
	<product>
	    <property>aero/tune/CMx_slats</property>
	    <interpolate1d>
		<property>fcs/surfaces/slats-pos-deg</property>
		<value>0</value> <value>0</value>
		<value>27.5</value> <property>aero/CMx_slats_27.5</property>
	    </interpolate1d>
	</product>
    </function>

    <!-- speedbrake -->
    <function name="aero/CMx_speedbrake_60">
	<table>
	    <independentVar lookup="row">velocities/mach</independentVar>
	    <independentVar lookup="column">aero/alpha-deg</independentVar>
	    <independentVar lookup="table">aero/beta-deg</independentVar>
	    <tableData breakPoint="-10.00000">
                -10.00     -5.00      0.00      5.00     10.00     15.00     20.00     30.00
		0.20000  -0.04133  -0.04262  -0.04408  -0.04466  -0.04454  -0.04335  -0.04102  -0.03503
		0.50000  -0.04355  -0.04493  -0.04654  -0.04718  -0.04731  -0.04620  -0.04389  -0.03733
	    </tableData>

	    <tableData breakPoint="0.00000">
                -10.00     -5.00      0.00      5.00     10.00     15.00     20.00     30.00
		0.20000  -0.04397  -0.04620  -0.04780  -0.04864  -0.04827  -0.04686  -0.04393  -0.03627
		0.50000  -0.04633  -0.04862  -0.05033  -0.05125  -0.05101  -0.04949  -0.04659  -0.03832
	    </tableData>

	    <tableData breakPoint="10.00000">
                -10.00     -5.00      0.00      5.00     10.00     15.00     20.00     30.00
		0.20000  -0.04443  -0.04673  -0.04782  -0.04936  -0.04904  -0.04745  -0.04432  -0.03634
		0.50000  -0.04647  -0.04907  -0.05067  -0.05184  -0.05147  -0.04980  -0.04680  -0.03823
	    </tableData>

	</table>
    </function>

    <function name="aero/CMx_speedbrake">
	<product>
	    <property>aero/tune/CMx_speedbrake</property>
	    <interpolate1d>
		<property>fcs/surfaces/speedbrake-pos-deg</property>
		<value>0</value> <value>0</value>
		<value>60</value> <property>aero/CMx_speedbrake_60</property>
	    </interpolate1d>
	</product>
    </function>

    <!-- CMY -->
    <!-- base -->
    <function name="aero/CMy_base">
	<table>
	    <independentVar lookup="row">velocities/mach</independentVar>
	    <independentVar lookup="column">aero/alpha-deg</independentVar>
	    <independentVar lookup="table">aero/beta-deg</independentVar>
	    <tableData breakPoint="-10.00000">
                -10.00     -5.00      0.00      5.00     10.00     15.00     20.00     30.00
		0.20000   0.11374   0.06576   0.01669  -0.03841  -0.10108  -0.16463  -0.21976  -0.33635
		0.50000   0.12447   0.07118   0.01606  -0.04435  -0.11137  -0.18012  -0.24226  -0.36888
		0.90000   0.17028   0.09422   0.01384  -0.06972  -0.16158  -0.25512  -0.34208  -0.52867
	    </tableData>

	    <tableData breakPoint="0.00000">
                -10.00     -5.00      0.00      5.00     10.00     15.00     20.00     30.00
		0.20000   0.11201   0.06288   0.02523  -0.03099  -0.08525  -0.16275  -0.24325  -0.36575
		0.50000   0.12270   0.06819   0.02437  -0.04073  -0.09815  -0.17817  -0.26542  -0.40262
		0.90000   0.18192   0.09794   0.02390  -0.07309  -0.16887  -0.27302  -0.38395  -0.56753
	    </tableData>

	    <tableData breakPoint="10.00000">
                -10.00     -5.00      0.00      5.00     10.00     15.00     20.00     30.00
		0.20000   0.11374   0.06576   0.01670  -0.03841  -0.10108  -0.16463  -0.21977  -0.33635
		0.50000   0.12447   0.07118   0.01606  -0.04435  -0.11137  -0.18012  -0.24226  -0.36888
		0.90000   0.17028   0.09422   0.01384  -0.06972  -0.16158  -0.25512  -0.34208  -0.52867
	    </tableData>

	</table>
    </function>

    <!-- elevator -->
    <function name="aero/CMy_elevator_-24">
	<table>
	    <independentVar lookup="row">velocities/mach</independentVar>
	    <independentVar lookup="column">aero/alpha-deg</independentVar>
	    <independentVar lookup="table">aero/beta-deg</independentVar>
	    <tableData breakPoint="-10.00000">
                -10.00     -5.00      0.00      5.00     10.00     15.00     20.00     30.00
		0.20000   0.32708   0.38884   0.43301   0.47545   0.49665   0.49996   0.48926   0.42147
		0.50000   0.33357   0.39917   0.44731   0.49301   0.51101   0.51807   0.51090   0.45097
		0.90000   0.37923   0.45124   0.51194   0.56262   0.59580   0.61002   0.61348   0.60468
	    </tableData>

	    <tableData breakPoint="0.00000">
                -10.00     -5.00      0.00      5.00     10.00     15.00     20.00     30.00
		0.20000   0.33620   0.39619   0.43922   0.47855   0.49024   0.52356   0.51589   0.44241
		0.50000   0.34342   0.40700   0.45123   0.49509   0.50716   0.53985   0.53952   0.47136
		0.90000   0.37518   0.45971   0.52287   0.57764   0.59887   0.63007   0.64618   0.62983
	    </tableData>

	    <tableData breakPoint="10.00000">
                -10.00     -5.00      0.00      5.00     10.00     15.00     20.00     30.00
		0.20000   0.32708   0.38885   0.43300   0.47545   0.49665   0.49996   0.48927   0.42147
		0.50000   0.33357   0.39950   0.44731   0.49300   0.51101   0.51807   0.51091   0.45097
		0.90000   0.37923   0.45124   0.51194   0.56263   0.59580   0.61003   0.61349   0.60468
	    </tableData>

	</table>
    </function>
    <function name="aero/CMy_elevator_-9.5">
	<table>
	    <independentVar lookup="row">velocities/mach</independentVar>
	    <independentVar lookup="column">aero/alpha-deg</independentVar>
	    <independentVar lookup="table">aero/beta-deg</independentVar>
	    <tableData breakPoint="-10.00000">
                -10.00     -5.00      0.00      5.00     10.00     15.00     20.00     30.00
		0.20000   0.17680   0.19235   0.19603   0.20308   0.20386   0.19732   0.18970   0.14131
		0.50000   0.18528   0.20089   0.20610   0.21200   0.21349   0.20745   0.20020   0.15679
		0.90000   0.23047   0.24389   0.25598   0.25338   0.26313   0.26452   0.25772   0.23473
	    </tableData>

	    <tableData breakPoint="0.00000">
                -10.00     -5.00      0.00      5.00     10.00     15.00     20.00     30.00
		0.20000   0.17886   0.19345   0.19836   0.20687   0.20123   0.21707   0.19522   0.14193
		0.50000   0.18892   0.20210   0.20852   0.21769   0.21077   0.22591   0.20781   0.15559
		0.90000   0.23119   0.24910   0.25863   0.27049   0.26341   0.27430   0.25152   0.22427
	    </tableData>

	    <tableData breakPoint="10.00000">
                -10.00     -5.00      0.00      5.00     10.00     15.00     20.00     30.00
		0.20000   0.17680   0.19235   0.19602   0.20308   0.20386   0.19732   0.18971   0.14132
		0.50000   0.18528   0.20089   0.20610   0.21200   0.21349   0.20745   0.20020   0.15679
		0.90000   0.23047   0.24389   0.25598   0.25338   0.26313   0.26452   0.25769   0.23473
	    </tableData>

	</table>
    </function>

    <function name="aero/CMy_elevator_1.5">
	<table>
	    <independentVar lookup="row">velocities/mach</independentVar>
	    <independentVar lookup="column">aero/alpha-deg</independentVar>
	    <independentVar lookup="table">aero/beta-deg</independentVar>
	    <tableData breakPoint="-10.00000">
                -10.00     -5.00      0.00      5.00     10.00     15.00     20.00     30.00
		0.20000  -0.00061  -0.00043  -0.00072  -0.00222  -0.00032  -0.00276  -0.00358  -0.00090
		0.50000  -0.00055  -0.00039   0.00060  -0.00163  -0.00128  -0.00094   0.00016  -0.00130
	    </tableData>

	    <tableData breakPoint="0.00000">
                -10.00     -5.00      0.00      5.00     10.00     15.00     20.00     30.00
		0.20000   0.00021   0.00012   0.00027   0.00000  -0.00035   0.00197  -0.00093  -0.00023
		0.50000   0.00000   0.00000   0.00014  -0.00019  -0.00057  -0.00165  -0.00061  -0.00029
	    </tableData>

	    <tableData breakPoint="10.00000">
                -10.00     -5.00      0.00      5.00     10.00     15.00     20.00     30.00
		0.20000  -0.00061  -0.00043  -0.00073  -0.00222  -0.00032  -0.00277  -0.00357  -0.00090
		0.50000  -0.00055  -0.00039   0.00060  -0.00163  -0.00128  -0.00098   0.00016  -0.00129
	    </tableData>

	</table>
    </function>

    <function name="aero/CMy_elevator">
	<product>
	    <property>aero/tune/CMy_elevator</property>
	    <interpolate1d>
		<property>fcs/surfaces/elevator-pos-deg</property>
		<value>-24</value> <property>aero/CMy_elevator_-24</property>
		<value>-9.5</value> <property>aero/CMy_elevator_-9.5</property>
		<value>0</value> <value>0</value>
		<value>1.5</value> <property>aero/CMy_elevator_1.5</property>
	    </interpolate1d>
	</product>
    </function>

    <!-- flap -->
    <function name="aero/CMy_flap_30">
	<table>
	    <independentVar lookup="row">velocities/mach</independentVar>
	    <independentVar lookup="column">aero/alpha-deg</independentVar>
	    <independentVar lookup="table">aero/beta-deg</independentVar>
	    <tableData breakPoint="-10.00000">
                -10.00     -5.00      0.00      5.00     10.00     15.00     20.00     30.00
		0.20000  -0.09216  -0.08426  -0.07273  -0.07937  -0.07702  -0.05657  -0.06323  -0.04230
		0.50000  -0.10999  -0.10191  -0.08356  -0.08982  -0.08593  -0.05945  -0.06329  -0.04684
		0.90000  -0.22246  -0.20993  -0.20024  -0.17554  -0.15040  -0.11986  -0.11283  -0.07432
	    </tableData>

	    <tableData breakPoint="0.00000">
                -10.00     -5.00      0.00      5.00     10.00     15.00     20.00     30.00
		0.20000  -0.08916  -0.06259  -0.05487  -0.05520  -0.04373  -0.05407  -0.05407  -0.07048
		0.50000  -0.10617  -0.07731  -0.07499  -0.07119  -0.05757  -0.05934  -0.06192  -0.07101
		0.90000  -0.22903  -0.19961  -0.17582  -0.18000  -0.15208  -0.14277  -0.11510  -0.09797
	    </tableData>

	    <tableData breakPoint="10.00000">
                -10.00     -5.00      0.00      5.00     10.00     15.00     20.00     30.00
		0.20000  -0.09216  -0.08426  -0.07274  -0.07938  -0.07703  -0.05656  -0.06322  -0.04230
		0.50000  -0.10999  -0.10192  -0.08355  -0.08982  -0.08594  -0.05944  -0.06328  -0.04684
		0.90000  -0.22246  -0.20993  -0.20023  -0.17554  -0.15039  -0.11986  -0.11282  -0.07432
	    </tableData>

	</table>
    </function>

    <function name="aero/CMy_flap_40">
	<table>
	    <independentVar lookup="row">velocities/mach</independentVar>
	    <independentVar lookup="column">aero/alpha-deg</independentVar>
	    <independentVar lookup="table">aero/beta-deg</independentVar>
	    <tableData breakPoint="-10.00000">
                -10.00     -5.00      0.00      5.00     10.00     15.00     20.00     30.00
		0.20000  -0.11084  -0.10085  -0.08055  -0.09048  -0.08488  -0.06382  -0.06860  -0.04670
		0.50000  -0.12730  -0.11626  -0.09247  -0.10264  -0.09472  -0.06806  -0.06932  -0.05083
		0.90000  -0.26164  -0.24683  -0.22607  -0.20186  -0.17098  -0.12499  -0.12400  -0.08151
	    </tableData>

	    <tableData breakPoint="0.00000">
                -10.00     -5.00      0.00      5.00     10.00     15.00     20.00     30.00
		0.20000  -0.10251  -0.07218  -0.06312  -0.06620  -0.04505  -0.05766  -0.06035  -0.07799
		0.50000  -0.12194  -0.09122  -0.08598  -0.07940  -0.05742  -0.06410  -0.06791  -0.07414
		0.90000  -0.26732  -0.23340  -0.20583  -0.20615  -0.17409  -0.15808  -0.12500  -0.10884
	    </tableData>

	    <tableData breakPoint="10.00000">
                -10.00     -5.00      0.00      5.00     10.00     15.00     20.00     30.00
		0.20000  -0.11084  -0.10085  -0.08057  -0.09048  -0.08489  -0.06381  -0.06860  -0.04670
		0.50000  -0.12730  -0.11626  -0.09246  -0.10269  -0.09474  -0.06805  -0.06932  -0.05083
		0.90000  -0.26164  -0.24683  -0.22607  -0.20187  -0.17098  -0.12498  -0.12399  -0.08155
	    </tableData>

	</table>
    </function>

    <function name="aero/CMy_flap">
	<product>
	    <property>aero/tune/CMy_flap</property>
	    <interpolate1d>
		<property>fcs/surfaces/flap-pos-deg</property>
		<value>0</value> <value>0</value>
		<value>30</value> <property>aero/CMy_flap_30</property>
		<value>40</value> <property>aero/CMy_flap_40</property>
	    </interpolate1d>
	</product>
    </function>

    <!-- left-flaperon -->
    <function name="aero/CMy_left-flaperon_-51">
	<table>
	    <independentVar lookup="row">velocities/mach</independentVar>
	    <independentVar lookup="column">aero/alpha-deg</independentVar>
	    <independentVar lookup="table">aero/beta-deg</independentVar>
	    <tableData breakPoint="-10.00000">
                -5.00      0.00      5.00     10.00     15.00     20.00     30.00
		0.20000   0.00872   0.00403   0.01518   0.02977   0.02119   0.02316   0.03876
		0.50000   0.01714   0.01286   0.02399   0.03684   0.02635   0.02840   0.04526
		0.90000   0.06084   0.07473   0.08340   0.08229   0.08786   0.09259   0.09839
	    </tableData>

	    <tableData breakPoint="0.00000">
                -5.00      0.00      5.00     10.00     15.00     20.00     30.00
		0.20000   0.04911   0.04094   0.05783   0.06042   0.06877   0.07346   0.07252
		0.50000   0.05875   0.05115   0.07063   0.07044   0.07625   0.08305   0.08595
		0.90000   0.12461   0.11813   0.14305   0.14908   0.15081   0.14735   0.14680
	    </tableData>

	    <tableData breakPoint="10.00000">
                -5.00      0.00      5.00     10.00     15.00     20.00     30.00
		0.20000   0.09462   0.09965   0.10552   0.11033   0.10892   0.10840   0.09680
		0.50000   0.10525   0.11158   0.11720   0.12263   0.11941   0.12138   0.10942
		0.90000   0.18314   0.19047   0.20004   0.20049   0.19608   0.19230   0.17639
	    </tableData>

	</table>
    </function>

    <function name="aero/CMy_left-flaperon">
	<product>
	    <property>aero/tune/CMy_left-flaperon</property>
	    <interpolate1d>
		<property>fcs/surfaces/left-flaperon-pos-deg</property>
		<value>-51</value> <property>aero/CMy_left-flaperon_-51</property>
		<value>0</value> <value>0</value>
	    </interpolate1d>
	</product>
    </function>

    <!-- right-flaperon -->
    <function name="aero/CMy_right-flaperon_-51">
	<table>
	    <independentVar lookup="row">velocities/mach</independentVar>
	    <independentVar lookup="column">aero/alpha-deg</independentVar>
	    <independentVar lookup="table">aero/beta-deg</independentVar>
	    <tableData breakPoint="-10.00000">
                -10.00     -5.00      0.00      5.00     10.00     15.00     20.00     30.00
		0.20000   0.08915   0.09116   0.09501   0.09960   0.10187   0.10093   0.09907   0.08386
		0.50000   0.09826   0.10176   0.10578   0.10966   0.11270   0.10912   0.11067   0.09266
		0.90000   0.17118   0.17748   0.18182   0.18875   0.18764   0.18131   0.17392   0.15394
	    </tableData>

	    <tableData breakPoint="0.00000">
                -10.00     -5.00      0.00      5.00     10.00     15.00     20.00     30.00
		0.20000   0.04340   0.04984   0.04034   0.05596   0.05689   0.06296   0.06483   0.06114
		0.50000   0.05261   0.05973   0.04988   0.06878   0.06635   0.06990   0.07295   0.07427
		0.90000   0.12120   0.12546   0.11602   0.13833   0.14129   0.13911   0.13345   0.12640
	    </tableData>

	    <tableData breakPoint="10.00000">
                -10.00     -5.00      0.00      5.00     10.00     15.00     20.00     30.00
		0.20000   0.00821   0.01973   0.01091   0.01686   0.02736   0.02067   0.02020   0.03195
		0.50000   0.01111   0.02564   0.01997   0.02611   0.03383   0.02551   0.02583   0.04037
		0.90000   0.05676   0.06968   0.07722   0.08540   0.07540   0.08315   0.08429   0.08457
	    </tableData>

	</table>
    </function>

    <function name="aero/CMy_right-flaperon">
	<product>
	    <property>aero/tune/CMy_right-flaperon</property>
	    <interpolate1d>
		<property>fcs/surfaces/right-flaperon-pos-deg</property>
		<value>-51</value> <property>aero/CMy_right-flaperon_-51</property>
		<value>0</value> <value>0</value>
	    </interpolate1d>
	</product>
    </function>

    <!-- rudder -->
    <function name="aero/CMy_rudder_-35">
	<table>
	    <independentVar lookup="row">velocities/mach</independentVar>
	    <independentVar lookup="column">aero/alpha-deg</independentVar>
	    <independentVar lookup="table">aero/beta-deg</independentVar>
	    <tableData breakPoint="-10.00000">
                -10.00     -5.00      0.00      5.00     10.00     15.00     20.00     30.00
		0.20000  -0.00460  -0.00529  -0.00844  -0.00377   0.00088   0.01515   0.01715   0.00987
		0.50000  -0.00571  -0.00656  -0.00866  -0.00642  -0.00118   0.00982   0.01562   0.01580
		0.90000  -0.00828  -0.00981  -0.01121  -0.01277  -0.00849  -0.00151   0.00550   0.00648
	    </tableData>

	    <tableData breakPoint="0.00000">
                -10.00     -5.00      0.00      5.00     10.00     15.00     20.00     30.00
		0.20000  -0.04221  -0.03856  -0.03335  -0.03277  -0.02502  -0.02286  -0.01627  -0.01063
		0.50000  -0.04261  -0.03958  -0.03378  -0.03125  -0.02476  -0.02594  -0.01712  -0.01172
		0.90000  -0.04556  -0.04442  -0.03845  -0.03277  -0.02652  -0.02213  -0.01562  -0.00734
	    </tableData>

	    <tableData breakPoint="10.00000">
                -10.00     -5.00      0.00      5.00     10.00     15.00     20.00     30.00
		0.20000  -0.06774  -0.06111  -0.05261  -0.06466  -0.04998  -0.05573  -0.04829  -0.03223
		0.50000  -0.07182  -0.06412  -0.05349  -0.05083  -0.04647  -0.05513  -0.04503  -0.02756
		0.90000  -0.07441  -0.07038  -0.05703  -0.05822  -0.04638  -0.04452  -0.03693  -0.01869
	    </tableData>

	</table>
    </function>

    <function name="aero/CMy_rudder_4">
	<table>
	    <independentVar lookup="row">velocities/mach</independentVar>
	    <independentVar lookup="column">aero/alpha-deg</independentVar>
	    <independentVar lookup="table">aero/beta-deg</independentVar>
	    <tableData breakPoint="-10.00000">
                -10.00     -5.00      0.00      5.00     10.00     15.00     20.00     30.00
		0.20000  -0.00578  -0.00549  -0.00448  -0.00490  -0.00610  -0.00480  -0.00746  -0.00323
		0.50000  -0.00625  -0.00552  -0.00469  -0.00564  -0.00489  -0.00565  -0.00437  -0.00349
		0.90000  -0.00582  -0.00578  -0.00475  -0.00403  -0.00376  -0.00473  -0.00502  -0.00233
	    </tableData>

	    <tableData breakPoint="0.00000">
                -10.00     -5.00      0.00      5.00     10.00     15.00     20.00     30.00
		0.20000  -0.00087  -0.00071  -0.00072  -0.00133  -0.00076  -0.00079  -0.00035  -0.00131
		0.50000  -0.00072  -0.00081  -0.00070  -0.00089  -0.00095  -0.00105  -0.00033  -0.00089
		0.90000  -0.00096  -0.00090  -0.00083  -0.00071  -0.00045  -0.00054  -0.00062  -0.00083
	    </tableData>

	    <tableData breakPoint="10.00000">
                -10.00     -5.00      0.00      5.00     10.00     15.00     20.00     30.00
		0.20000   0.00400   0.00401   0.00316   0.00390   0.00436   0.00690   0.00408   0.00358
		0.50000   0.00406   0.00387   0.00338   0.00278   0.00364   0.00611   0.00471   0.00385
		0.90000   0.00442   0.00399   0.00334   0.00265   0.00215   0.00142   0.00281   0.00159
	    </tableData>

	</table>
    </function>

    <function name="aero/CMy_rudder_-4">
	<table>
	    <independentVar lookup="row">velocities/mach</independentVar>
	    <independentVar lookup="column">aero/alpha-deg</independentVar>
	    <independentVar lookup="table">aero/beta-deg</independentVar>
	    <tableData breakPoint="-10.00000">
                -10.00     -5.00      0.00      5.00     10.00     15.00     20.00     30.00
		0.20000   0.00400   0.00401   0.00317   0.00390   0.00436   0.00690   0.00408   0.00358
		0.50000   0.00406   0.00387   0.00338   0.00278   0.00364   0.00612   0.00472   0.00385
		0.90000   0.00442   0.00399   0.00334   0.00265   0.00215   0.00142   0.00281   0.00159
	    </tableData>

	    <tableData breakPoint="0.00000">
                -10.00     -5.00      0.00      5.00     10.00     15.00     20.00     30.00
		0.20000  -0.00087  -0.00071  -0.00072  -0.00134  -0.00076  -0.00079  -0.00035  -0.00131
		0.50000  -0.00072  -0.00081  -0.00070  -0.00089  -0.00095  -0.00105  -0.00033  -0.00089
		0.90000  -0.00096  -0.00090  -0.00083  -0.00071  -0.00045  -0.00054  -0.00062  -0.00083
	    </tableData>

	    <tableData breakPoint="10.00000">
                -10.00     -5.00      0.00      5.00     10.00     15.00     20.00     30.00
		0.20000  -0.00578  -0.00549  -0.00449  -0.00490  -0.00611  -0.00480  -0.00745  -0.00323
		0.50000  -0.00625  -0.00552  -0.00469  -0.00564  -0.00489  -0.00565  -0.00437  -0.00349
		0.90000  -0.00582  -0.00578  -0.00474  -0.00403  -0.00376  -0.00473  -0.00502  -0.00233
	    </tableData>

	</table>
    </function>

    <function name="aero/CMy_rudder_35">
	<table>
	    <independentVar lookup="row">velocities/mach</independentVar>
	    <independentVar lookup="column">aero/alpha-deg</independentVar>
	    <independentVar lookup="table">aero/beta-deg</independentVar>
	    <tableData breakPoint="-10.00000">
                -10.00     -5.00      0.00      5.00     10.00     15.00     20.00     30.00
		0.20000  -0.06774  -0.06111  -0.05260  -0.06465  -0.04998  -0.05573  -0.04830  -0.03223
		0.50000  -0.07182  -0.06412  -0.05349  -0.05081  -0.04647  -0.05512  -0.04503  -0.02756
		0.90000  -0.07441  -0.07038  -0.05704  -0.05822  -0.04638  -0.04452  -0.03693  -0.01869
	    </tableData>

	    <tableData breakPoint="0.00000">
                -10.00     -5.00      0.00      5.00     10.00     15.00     20.00     30.00
		0.20000  -0.04220  -0.03856  -0.03335  -0.03276  -0.02502  -0.02285  -0.01626  -0.01063
		0.50000  -0.04261  -0.03958  -0.03378  -0.03125  -0.02401  -0.02594  -0.01712  -0.01172
		0.90000  -0.04556  -0.04443  -0.03845  -0.03277  -0.02652  -0.02213  -0.01562  -0.00734
	    </tableData>

	    <tableData breakPoint="10.00000">
                -10.00     -5.00      0.00      5.00     10.00     15.00     20.00     30.00
		0.20000  -0.00460  -0.00529  -0.00845  -0.00377   0.00088   0.01515   0.01716   0.00987
		0.50000  -0.00571  -0.00656  -0.00866  -0.00642  -0.00118   0.00982   0.01562   0.01580
		0.90000  -0.00828  -0.00981  -0.01120  -0.01277  -0.00849  -0.00151   0.00550   0.00648
	    </tableData>

	</table>
    </function>

    <function name="aero/CMy_rudder">
	<product>
	    <property>aero/tune/CMy_rudder</property>
	    <interpolate1d>
		<property>fcs/surfaces/rudder-pos-deg</property>
		<value>-35</value> <property>aero/CMy_rudder_-35</property>
		<value>-4</value> <property>aero/CMy_rudder_-4</property>
		<value>0</value> <value>0</value>
		<value>4</value> <property>aero/CMy_rudder_4</property>
		<value>35</value> <property>aero/CMy_rudder_35</property>
	    </interpolate1d>
	</product>
    </function>

    <!-- slats -->
    <function name="aero/CMy_slats_27.5">
	<table>
	    <independentVar lookup="row">velocities/mach</independentVar>
	    <independentVar lookup="column">aero/alpha-deg</independentVar>
	    <independentVar lookup="table">aero/beta-deg</independentVar>
	    <tableData breakPoint="-10.00000">
                -10.00     -5.00      0.00      5.00     10.00     15.00     20.00     30.00
		0.20000  -0.00341  -0.00383  -0.00381  -0.00361  -0.00369  -0.00350  -0.00435  -0.00396
		0.50000  -0.00389  -0.00439  -0.00440  -0.00500  -0.00432  -0.00420  -0.00441  -0.00438
		0.90000  -0.00787  -0.00844  -0.00861  -0.00882  -0.00855  -0.00840  -0.00845  -0.00851
	    </tableData>

	    <tableData breakPoint="0.00000">
                -10.00     -5.00      0.00      5.00     10.00     15.00     20.00     30.00
		0.20000  -0.00415  -0.00464  -0.00467  -0.00437  -0.00417  -0.00395  -0.00363  -0.00356
		0.50000  -0.00483  -0.00521  -0.00526  -0.00493  -0.00481  -0.00444  -0.00410  -0.00397
		0.90000  -0.00885  -0.00943  -0.00968  -0.00932  -0.00897  -0.00841  -0.00836  -0.00801
	    </tableData>

	    <tableData breakPoint="10.00000">
                -10.00     -5.00      0.00      5.00     10.00     15.00     20.00     30.00
		0.20000  -0.00492  -0.00504  -0.00490  -0.00493  -0.00432  -0.00390  -0.00422  -0.00366
		0.50000  -0.00546  -0.00568  -0.00558  -0.00600  -0.00506  -0.00487  -0.00469  -0.00395
		0.90000  -0.00956  -0.00988  -0.00979  -0.00960  -0.00915  -0.00878  -0.00827  -0.00819
	    </tableData>

	</table>
    </function>

    <function name="aero/CMy_slats">
	<product>
	    <property>aero/tune/CMy_slats</property>
	    <interpolate1d>
		<property>fcs/surfaces/slats-pos-deg</property>
		<value>0</value> <value>0</value>
		<value>27.5</value> <property>aero/CMy_slats_27.5</property>
	    </interpolate1d>
	</product>
    </function>

    <!-- speedbrake -->
    <function name="aero/CMy_speedbrake_60">
	<table>
	    <independentVar lookup="row">velocities/mach</independentVar>
	    <independentVar lookup="column">aero/alpha-deg</independentVar>
	    <independentVar lookup="table">aero/beta-deg</independentVar>
	    <tableData breakPoint="-10.00000">
                -10.00     -5.00      0.00      5.00     10.00     15.00     20.00     30.00
		0.20000   0.05070   0.05243   0.05598   0.05891   0.06071   0.05610   0.05153   0.03903
		0.50000   0.05543   0.05827   0.06265   0.06374   0.06609   0.06278   0.05879   0.04618
	    </tableData>

	    <tableData breakPoint="0.00000">
                -10.00     -5.00      0.00      5.00     10.00     15.00     20.00     30.00
		0.20000   0.05387   0.06087   0.06574   0.06811   0.06494   0.06643   0.05914   0.03472
		0.50000   0.05952   0.06697   0.07217   0.07532   0.07104   0.06769   0.06448   0.04051
	    </tableData>

	    <tableData breakPoint="10.00000">
                -10.00     -5.00      0.00      5.00     10.00     15.00     20.00     30.00
		0.20000   0.05814   0.06254   0.06827   0.07013   0.07367   0.06572   0.05441   0.03411
		0.50000   0.06447   0.06781   0.07416   0.07398   0.07975   0.07015   0.06265   0.03718
	    </tableData>

	</table>
    </function>

    <function name="aero/CMy_speedbrake">
	<product>
	    <property>aero/tune/CMy_speedbrake</property>
	    <interpolate1d>
		<property>fcs/surfaces/speedbrake-pos-deg</property>
		<value>0</value> <value>0</value>
		<value>60</value> <property>aero/CMy_speedbrake_60</property>
	    </interpolate1d>
	</product>
    </function>

    <!-- CMZ -->
    <!-- base -->
    <function name="aero/CMz_base">
	<table>
	    <independentVar lookup="row">velocities/mach</independentVar>
	    <independentVar lookup="column">aero/alpha-deg</independentVar>
	    <independentVar lookup="table">aero/beta-deg</independentVar>
	    <tableData breakPoint="-10.00000">
                -10.00     -5.00      0.00      5.00     10.00     15.00     20.00     30.00
		0.20000  -0.00332   0.00087   0.00049  -0.00280  -0.00396   0.00047   0.00401  -0.01338
		0.50000  -0.00414   0.00094   0.00075  -0.00247  -0.00406  -0.00123   0.00135  -0.01578
		0.90000  -0.00709  -0.00072  -0.00013  -0.00118  -0.00462  -0.00340  -0.00899  -0.02979
	    </tableData>

	    <tableData breakPoint="0.00000">
                -10.00     -5.00      0.00      5.00     10.00     15.00     20.00     30.00
		0.20000   0.00000  -0.00000   0.00000  -0.00000  -0.00000   0.00000   0.00000   0.00000
		0.50000   0.00000  -0.00000  -0.00000   0.00000   0.00000   0.00000   0.00000  -0.00000
		0.90000  -0.00000  -0.00000   0.00000  -0.00000  -0.00000  -0.00000  -0.00000  -0.00000
	    </tableData>

	    <tableData breakPoint="10.00000">
                -10.00     -5.00      0.00      5.00     10.00     15.00     20.00     30.00
		0.20000   0.00332  -0.00087  -0.00049   0.00280   0.00396  -0.00047  -0.00401   0.01337
		0.50000   0.00413  -0.00094  -0.00075   0.00247   0.00406   0.00123  -0.00135   0.01578
		0.90000   0.00709   0.00072   0.00013   0.00118   0.00462   0.00340   0.00899   0.02979
	    </tableData>

	</table>
    </function>

    <!-- elevator -->
    <function name="aero/CMz_elevator_-24">
	<table>
	    <independentVar lookup="row">velocities/mach</independentVar>
	    <independentVar lookup="column">aero/alpha-deg</independentVar>
	    <independentVar lookup="table">aero/beta-deg</independentVar>
	    <tableData breakPoint="-10.00000">
                -10.00     -5.00      0.00      5.00     10.00     15.00     20.00     30.00
		0.20000  -0.01811  -0.01732  -0.01486  -0.01255  -0.00970  -0.00711  -0.00476   0.00182
		0.50000  -0.01891  -0.01825  -0.01565  -0.01404  -0.00998  -0.00732  -0.00599   0.00135
		0.90000  -0.02371  -0.02130  -0.01689  -0.01771  -0.01403  -0.01295  -0.00841   0.00133
	    </tableData>

	    <tableData breakPoint="0.00000">
                -10.00     -5.00      0.00      5.00     10.00     15.00     20.00     30.00
		0.20000   0.00000   0.00000   0.00000   0.00000   0.00000  -0.00000   0.00000  -0.00000
		0.50000   0.00000   0.00000   0.00000  -0.00000  -0.00000   0.00000  -0.00000   0.00000
		0.90000   0.00000   0.00000   0.00000   0.00000   0.00000   0.00000   0.00000   0.00000
	    </tableData>

	    <tableData breakPoint="10.00000">
                -10.00     -5.00      0.00      5.00     10.00     15.00     20.00     30.00
		0.20000   0.01811   0.01732   0.01486   0.01255   0.00970   0.00711   0.00476  -0.00182
		0.50000   0.01892   0.01816   0.01565   0.01405   0.00998   0.00732   0.00599  -0.00135
		0.90000   0.02371   0.02130   0.01689   0.01771   0.01403   0.01295   0.00841  -0.00133
	    </tableData>

	</table>
    </function>

    <function name="aero/CMz_elevator_-9.5">
	<table>
	    <independentVar lookup="row">velocities/mach</independentVar>
	    <independentVar lookup="column">aero/alpha-deg</independentVar>
	    <independentVar lookup="table">aero/beta-deg</independentVar>
	    <tableData breakPoint="-10.00000">
                -10.00     -5.00      0.00      5.00     10.00     15.00     20.00     30.00
		0.20000  -0.00706  -0.00466  -0.00304  -0.00224  -0.00010  -0.00079   0.00140   0.00417
		0.50000  -0.00672  -0.00487  -0.00389  -0.00326   0.00000  -0.00016   0.00176   0.00376
		0.90000  -0.00886  -0.00765  -0.00477  -0.00556  -0.00323  -0.00214   0.00043   0.00569
	    </tableData>

	    <tableData breakPoint="0.00000">
                -10.00     -5.00      0.00      5.00     10.00     15.00     20.00     30.00
		0.20000   0.00000   0.00000   0.00000   0.00000   0.00000   0.00000   0.00000  -0.00000
		0.50000   0.00000   0.00000   0.00000  -0.00000  -0.00000   0.00000   0.00000   0.00000
		0.90000   0.00000   0.00000  -0.00000   0.00000   0.00000   0.00000   0.00000   0.00000
	    </tableData>

	    <tableData breakPoint="10.00000">
                -10.00     -5.00      0.00      5.00     10.00     15.00     20.00     30.00
		0.20000   0.00706   0.00467   0.00304   0.00224   0.00010   0.00079  -0.00140  -0.00417
		0.50000   0.00673   0.00487   0.00389   0.00326   0.00000   0.00016  -0.00176  -0.00376
		0.90000   0.00886   0.00765   0.00477   0.00556   0.00323   0.00214  -0.00043  -0.00569
	    </tableData>

	</table>
    </function>

    <function name="aero/CMz_elevator_1.5">
	<table>
	    <independentVar lookup="row">velocities/mach</independentVar>
	    <independentVar lookup="column">aero/alpha-deg</independentVar>
	    <independentVar lookup="table">aero/beta-deg</independentVar>
	    <tableData breakPoint="-10.00000">
                -10.00     -5.00      0.00      5.00     10.00     15.00     20.00     30.00
		0.20000   0.00029  -0.00029  -0.00049  -0.00047  -0.00072  -0.00080  -0.00065  -0.00064
		0.50000   0.00070  -0.00033  -0.00049  -0.00051  -0.00071  -0.00071  -0.00056  -0.00054
	    </tableData>

	    <tableData breakPoint="0.00000">
                -10.00     -5.00      0.00      5.00     10.00     15.00     20.00     30.00
		0.20000   0.00000   0.00000   0.00000   0.00000   0.00000   0.00000   0.00000   0.00000
		0.50000   0.00000   0.00000   0.00000   0.00000   0.00000   0.00000   0.00000   0.00000
	    </tableData>

	    <tableData breakPoint="10.00000">
                -10.00     -5.00      0.00      5.00     10.00     15.00     20.00     30.00
		0.20000  -0.00029   0.00029   0.00049   0.00047   0.00072   0.00080   0.00065   0.00065
		0.50000  -0.00069   0.00033   0.00049   0.00050   0.00071   0.00071   0.00056   0.00053
	    </tableData>

	</table>
    </function>

    <function name="aero/CMz_elevator">
	<product>
	    <property>aero/tune/CMz_elevator</property>
	    <interpolate1d>
		<property>fcs/surfaces/elevator-pos-deg</property>
		<value>-24</value> <property>aero/CMz_elevator_-24</property>
		<value>-9.5</value> <property>aero/CMz_elevator_-9.5</property>
		<value>0</value> <value>0</value>
		<value>1.5</value> <property>aero/CMz_elevator_1.5</property>
	    </interpolate1d>
	</product>
    </function>

    <!-- flap -->
    <function name="aero/CMz_flap_30">
	<table>
	    <independentVar lookup="row">velocities/mach</independentVar>
	    <independentVar lookup="column">aero/alpha-deg</independentVar>
	    <independentVar lookup="table">aero/beta-deg</independentVar>
	    <tableData breakPoint="-10.00000">
                -10.00     -5.00      0.00      5.00     10.00     15.00     20.00     30.00
		0.20000  -0.00093  -0.00641  -0.01274  -0.01077  -0.00296  -0.00244  -0.00023  -0.00155
		0.50000  -0.00059  -0.00706  -0.01313  -0.01245  -0.00590  -0.00403  -0.00382  -0.00088
		0.90000  -0.00130  -0.00712  -0.01169  -0.01666  -0.01534  -0.01163  -0.00912  -0.00741
	    </tableData>

	    <tableData breakPoint="0.00000">
                -10.00     -5.00      0.00      5.00     10.00     15.00     20.00     30.00
		0.20000  -0.00000   0.00000   0.00000   0.00000   0.00000  -0.00000  -0.00000   0.00000
		0.50000  -0.00000   0.00000   0.00000   0.00000   0.00000  -0.00000  -0.00000   0.00000
		0.90000   0.00000   0.00000   0.00000   0.00000   0.00000   0.00000   0.00000   0.00000
	    </tableData>

	    <tableData breakPoint="10.00000">
                -10.00     -5.00      0.00      5.00     10.00     15.00     20.00     30.00
		0.20000   0.00093   0.00641   0.01274   0.01077   0.00296   0.00244   0.00023   0.00156
		0.50000   0.00060   0.00706   0.01313   0.01245   0.00590   0.00403   0.00382   0.00087
		0.90000   0.00130   0.00712   0.01169   0.01666   0.01533   0.01163   0.00912   0.00741
	    </tableData>

	</table>
    </function>

    <function name="aero/CMz_flap_40">
	<table>
	    <independentVar lookup="row">velocities/mach</independentVar>
	    <independentVar lookup="column">aero/alpha-deg</independentVar>
	    <independentVar lookup="table">aero/beta-deg</independentVar>
	    <tableData breakPoint="-10.00000">
                -10.00     -5.00      0.00      5.00     10.00     15.00     20.00     30.00
		0.20000  -0.00226  -0.00822  -0.01576  -0.01163  -0.00351  -0.00382  -0.00017  -0.00221
		0.50000  -0.00203  -0.00887  -0.01650  -0.01463  -0.00641  -0.00616  -0.00415  -0.00079
		0.90000  -0.00251  -0.00965  -0.01520  -0.02008  -0.01805  -0.01515  -0.01166  -0.00855
	    </tableData>

	    <tableData breakPoint="0.00000">
                -10.00     -5.00      0.00      5.00     10.00     15.00     20.00     30.00
		0.20000  -0.00000   0.00000   0.00000   0.00000   0.00000  -0.00000  -0.00000   0.00000
		0.50000  -0.00000   0.00000   0.00000   0.00000  -0.00000  -0.00000  -0.00000   0.00000
		0.90000   0.00000   0.00000  -0.00000   0.00000   0.00000   0.00000   0.00000   0.00000
	    </tableData>

	    <tableData breakPoint="10.00000">
                -10.00     -5.00      0.00      5.00     10.00     15.00     20.00     30.00
		0.20000   0.00226   0.00822   0.01576   0.01163   0.00351   0.00382   0.00017   0.00222
		0.50000   0.00204   0.00887   0.01650   0.01464   0.00641   0.00615   0.00415   0.00079
		0.90000   0.00251   0.00965   0.01520   0.02008   0.01805   0.01515   0.01166   0.00855
	    </tableData>

	</table>
    </function>

    <function name="aero/CMz_flap">
	<product>
	    <property>aero/tune/CMz_flap</property>
	    <interpolate1d>
		<property>fcs/surfaces/flap-pos-deg</property>
		<value>0</value> <value>0</value>
		<value>30</value> <property>aero/CMz_flap_30</property>
		<value>40</value> <property>aero/CMz_flap_40</property>
	    </interpolate1d>
	</product>
    </function>

    <!-- left-flaperon -->
    <function name="aero/CMz_left-flaperon_-51">
	<table>
	    <independentVar lookup="row">velocities/mach</independentVar>
	    <independentVar lookup="column">aero/alpha-deg</independentVar>
	    <independentVar lookup="table">aero/beta-deg</independentVar>
	    <tableData breakPoint="-10.00000">
                -5.00      0.00      5.00     10.00     15.00     20.00     30.00
		0.20000   0.00399   0.01066   0.01490   0.01456   0.01011   0.00785   0.01490
		0.50000   0.00377   0.01099   0.01580   0.01600   0.01294   0.01111   0.01940
		0.90000   0.00350   0.01471   0.01977   0.02325   0.02405   0.02872   0.03772
	    </tableData>

	    <tableData breakPoint="0.00000">
                -5.00      0.00      5.00     10.00     15.00     20.00     30.00
		0.20000   0.00435   0.00969   0.01396   0.01359   0.01252   0.01519   0.01961
		0.50000   0.00513   0.01049   0.01487   0.01488   0.01382   0.01567   0.02084
		0.90000   0.00682   0.01361   0.01935   0.02337   0.02571   0.02995   0.03379
	    </tableData>

	    <tableData breakPoint="10.00000">
                -5.00      0.00      5.00     10.00     15.00     20.00     30.00
		0.20000   0.00634   0.01090   0.01165   0.01374   0.01470   0.01359   0.01547
		0.50000   0.00698   0.01218   0.01311   0.01473   0.01606   0.01460   0.01648
		0.90000   0.01160   0.01636   0.02026   0.02170   0.02669   0.02592   0.02635
	    </tableData>

	</table>
    </function>

    <function name="aero/CMz_left-flaperon">
	<product>
	    <property>aero/tune/CMz_left-flaperon</property>
	    <interpolate1d>
		<property>fcs/surfaces/left-flaperon-pos-deg</property>
		<value>-51</value> <property>aero/CMz_left-flaperon_-51</property>
		<value>0</value> <value>0</value>
	    </interpolate1d>
	</product>
    </function>

    <!-- right-flaperon -->
    <function name="aero/CMz_right-flaperon_-51">
	<table>
	    <independentVar lookup="row">velocities/mach</independentVar>
	    <independentVar lookup="column">aero/alpha-deg</independentVar>
	    <independentVar lookup="table">aero/beta-deg</independentVar>
	    <tableData breakPoint="-10.00000">
                -10.00     -5.00      0.00      5.00     10.00     15.00     20.00     30.00
		0.20000  -0.00208  -0.00498  -0.00878  -0.00938  -0.01126  -0.01180  -0.01064  -0.01180
		0.50000  -0.00274  -0.00569  -0.00977  -0.01056  -0.01217  -0.01291  -0.01170  -0.01259
		0.90000  -0.00550  -0.00969  -0.01371  -0.01715  -0.01823  -0.02281  -0.02177  -0.02373
	    </tableData>

	    <tableData breakPoint="0.00000">
                -10.00     -5.00      0.00      5.00     10.00     15.00     20.00     30.00
		0.20000   0.00192  -0.00341  -0.00794  -0.01181  -0.01121  -0.01020  -0.01269  -0.01591
		0.50000   0.00172  -0.00408  -0.00866  -0.01256  -0.01228  -0.01140  -0.01300  -0.01657
		0.90000  -0.00012  -0.00572  -0.01155  -0.01671  -0.01983  -0.02193  -0.02561  -0.02834
	    </tableData>

	    <tableData breakPoint="10.00000">
                -10.00     -5.00      0.00      5.00     10.00     15.00     20.00     30.00
		0.20000  -0.00012  -0.00321  -0.00936  -0.01274  -0.01209  -0.00841  -0.00600  -0.01101
		0.50000   0.00000  -0.00342  -0.00954  -0.01361  -0.01359  -0.01088  -0.00924  -0.01469
		0.90000   0.00000  -0.00390  -0.01334  -0.01739  -0.01953  -0.02047  -0.02426  -0.03155
	    </tableData>

	</table>
    </function>

    <function name="aero/CMz_right-flaperon">
	<product>
	    <property>aero/tune/CMz_right-flaperon</property>
	    <interpolate1d>
		<property>fcs/surfaces/right-flaperon-pos-deg</property>
		<value>-51</value> <property>aero/CMz_right-flaperon_-51</property>
		<value>0</value> <value>0</value>
	    </interpolate1d>
	</product>
    </function>

    <!-- rudder -->
    <function name="aero/CMz_rudder_-35">
	<table>
	    <independentVar lookup="row">velocities/mach</independentVar>
	    <independentVar lookup="column">aero/alpha-deg</independentVar>
	    <independentVar lookup="table">aero/beta-deg</independentVar>
	    <tableData breakPoint="-10.00000">
                -10.00     -5.00      0.00      5.00     10.00     15.00     20.00     30.00
		0.20000  -0.04079  -0.04126  -0.04120  -0.03961  -0.03850  -0.03631  -0.03476  -0.02910
		0.50000  -0.04213  -0.04334  -0.04363  -0.04220  -0.04051  -0.03795  -0.03578  -0.03006
		0.90000  -0.05006  -0.05223  -0.05214  -0.05218  -0.05099  -0.04937  -0.04745  -0.03864
	    </tableData>

	    <tableData breakPoint="0.00000">
                -10.00     -5.00      0.00      5.00     10.00     15.00     20.00     30.00
		0.20000  -0.03845  -0.03982  -0.03892  -0.04032  -0.03575  -0.03241  -0.02782  -0.02603
		0.50000  -0.03983  -0.04129  -0.04110  -0.04225  -0.03798  -0.03490  -0.02993  -0.02896
		0.90000  -0.04820  -0.04902  -0.05091  -0.05181  -0.04830  -0.04391  -0.04263  -0.03805
	    </tableData>

	    <tableData breakPoint="10.00000">
                -10.00     -5.00      0.00      5.00     10.00     15.00     20.00     30.00
		0.20000  -0.04026  -0.04013  -0.03864  -0.03761  -0.03588  -0.03416  -0.03307  -0.02533
		0.50000  -0.04237  -0.04194  -0.04063  -0.03915  -0.03848  -0.03594  -0.03243  -0.02656
		0.90000  -0.04538  -0.04653  -0.04577  -0.04603  -0.04367  -0.04192  -0.04005  -0.03248
	    </tableData>

	</table>
    </function>

    <function name="aero/CMz_rudder_4">
	<table>
	    <independentVar lookup="row">velocities/mach</independentVar>
	    <independentVar lookup="column">aero/alpha-deg</independentVar>
	    <independentVar lookup="table">aero/beta-deg</independentVar>
	    <tableData breakPoint="-10.00000">
                -10.00     -5.00      0.00      5.00     10.00     15.00     20.00     30.00
		0.20000   0.00549   0.00592   0.00573   0.00529   0.00556   0.00499   0.00457   0.00368
		0.50000   0.00631   0.00618   0.00607   0.00566   0.00567   0.00509   0.00521   0.00401
		0.90000   0.00689   0.00710   0.00704   0.00691   0.00682   0.00640   0.00621   0.00484
	    </tableData>

	    <tableData breakPoint="0.00000">
                -10.00     -5.00      0.00      5.00     10.00     15.00     20.00     30.00
		0.20000   0.00554   0.00563   0.00555   0.00580   0.00516   0.00490   0.00395   0.00333
		0.50000   0.00581   0.00593   0.00590   0.00599   0.00529   0.00522   0.00447   0.00430
		0.90000   0.00704   0.00711   0.00736   0.00761   0.00707   0.00667   0.00606   0.00547
	    </tableData>

	    <tableData breakPoint="10.00000">
                -10.00     -5.00      0.00      5.00     10.00     15.00     20.00     30.00
		0.20000   0.00545   0.00593   0.00582   0.00541   0.00547   0.00502   0.00499   0.00392
		0.50000   0.00600   0.00623   0.00613   0.00575   0.00588   0.00503   0.00497   0.00396
		0.90000   0.00696   0.00721   0.00715   0.00722   0.00700   0.00688   0.00645   0.00526
	    </tableData>

	</table>
    </function>

    <function name="aero/CMz_rudder_-4">
	<table>
	    <independentVar lookup="row">velocities/mach</independentVar>
	    <independentVar lookup="column">aero/alpha-deg</independentVar>
	    <independentVar lookup="table">aero/beta-deg</independentVar>
	    <tableData breakPoint="-10.00000">
                -10.00     -5.00      0.00      5.00     10.00     15.00     20.00     30.00
		0.20000  -0.00545  -0.00593  -0.00582  -0.00541  -0.00547  -0.00502  -0.00499  -0.00391
		0.50000  -0.00599  -0.00623  -0.00613  -0.00575  -0.00588  -0.00503  -0.00497  -0.00396
		0.90000  -0.00696  -0.00721  -0.00715  -0.00722  -0.00700  -0.00688  -0.00645  -0.00527
	    </tableData>

	    <tableData breakPoint="0.00000">
                -10.00     -5.00      0.00      5.00     10.00     15.00     20.00     30.00
		0.20000  -0.00554  -0.00563  -0.00555  -0.00580  -0.00516  -0.00490  -0.00395  -0.00333
		0.50000  -0.00581  -0.00593  -0.00590  -0.00599  -0.00529  -0.00522  -0.00447  -0.00430
		0.90000  -0.00704  -0.00711  -0.00736  -0.00761  -0.00707  -0.00667  -0.00606  -0.00547
	    </tableData>

	    <tableData breakPoint="10.00000">
                -10.00     -5.00      0.00      5.00     10.00     15.00     20.00     30.00
		0.20000  -0.00549  -0.00592  -0.00573  -0.00529  -0.00556  -0.00499  -0.00457  -0.00367
		0.50000  -0.00630  -0.00618  -0.00607  -0.00566  -0.00567  -0.00509  -0.00521  -0.00401
		0.90000  -0.00689  -0.00710  -0.00704  -0.00691  -0.00682  -0.00640  -0.00621  -0.00484
	    </tableData>

	</table>
    </function>

    <function name="aero/CMz_rudder_35">
	<table>
	    <independentVar lookup="row">velocities/mach</independentVar>
	    <independentVar lookup="column">aero/alpha-deg</independentVar>
	    <independentVar lookup="table">aero/beta-deg</independentVar>
	    <tableData breakPoint="-10.00000">
                -10.00     -5.00      0.00      5.00     10.00     15.00     20.00     30.00
		0.20000   0.04026   0.04013   0.03864   0.03761   0.03588   0.03416   0.03307   0.02534
		0.50000   0.04238   0.04194   0.04063   0.03915   0.03848   0.03594   0.03243   0.02656
		0.90000   0.04538   0.04653   0.04577   0.04603   0.04367   0.04192   0.04005   0.03247
	    </tableData>

	    <tableData breakPoint="0.00000">
                -10.00     -5.00      0.00      5.00     10.00     15.00     20.00     30.00
		0.20000   0.03845   0.03982   0.03892   0.04032   0.03575   0.03241   0.02782   0.02603
		0.50000   0.03983   0.04129   0.04110   0.04225   0.03795   0.03490   0.02993   0.02896
		0.90000   0.04820   0.04902   0.05091   0.05181   0.04830   0.04391   0.04263   0.03805
	    </tableData>

	    <tableData breakPoint="10.00000">
                -10.00     -5.00      0.00      5.00     10.00     15.00     20.00     30.00
		0.20000   0.04079   0.04126   0.04120   0.03961   0.03850   0.03631   0.03476   0.02911
		0.50000   0.04214   0.04334   0.04363   0.04220   0.04051   0.03795   0.03577   0.03006
		0.90000   0.05006   0.05223   0.05214   0.05218   0.05099   0.04937   0.04745   0.03864
	    </tableData>

	</table>
    </function>

    <function name="aero/CMz_rudder">
	<product>
	    <property>aero/tune/CMz_rudder</property>
	    <interpolate1d>
		<property>fcs/surfaces/rudder-pos-deg</property>
		<value>-35</value> <property>aero/CMz_rudder_-35</property>
		<value>-4</value> <property>aero/CMz_rudder_-4</property>
		<value>0</value> <value>0</value>
		<value>4</value> <property>aero/CMz_rudder_4</property>
		<value>35</value> <property>aero/CMz_rudder_35</property>
	    </interpolate1d>
	</product>
    </function>

    <!-- slats -->
    <function name="aero/CMz_slats_27.5">
	<table>
	    <independentVar lookup="row">velocities/mach</independentVar>
	    <independentVar lookup="column">aero/alpha-deg</independentVar>
	    <independentVar lookup="table">aero/beta-deg</independentVar>
	    <tableData breakPoint="-10.00000">
                -10.00     -5.00      0.00      5.00     10.00     15.00     20.00     30.00
		0.20000  -0.00136  -0.00061   0.00000   0.00096   0.00216   0.00417   0.00682   0.01480
		0.50000  -0.00156  -0.00066   0.00000   0.00104   0.00230   0.00437   0.00723   0.01578
		0.90000  -0.00236  -0.00100   0.00013   0.00129   0.00305   0.00573   0.00950   0.02061
	    </tableData>

	    <tableData breakPoint="0.00000">
                -10.00     -5.00      0.00      5.00     10.00     15.00     20.00     30.00
		0.20000  -0.00013   0.00000   0.00000   0.00000   0.00037   0.00157   0.00369   0.01103
		0.50000  -0.00016   0.00000   0.00000   0.00000   0.00042   0.00172   0.00398   0.01175
		0.90000  -0.00034   0.00000   0.00000   0.00000   0.00072   0.00239   0.00539   0.01563
	    </tableData>

	    <tableData breakPoint="10.00000">
                -10.00     -5.00      0.00      5.00     10.00     15.00     20.00     30.00
		0.20000   0.00060   0.00037  -0.00015  -0.00061  -0.00050   0.00026   0.00195   0.00839
		0.50000   0.00062   0.00040  -0.00015  -0.00068  -0.00046   0.00038   0.00213   0.00898
		0.90000   0.00077   0.00054  -0.00013  -0.00052  -0.00040   0.00067   0.00312   0.01226
	    </tableData>

	</table>
    </function>

    <function name="aero/CMz_slats">
	<product>
	    <property>aero/tune/CMz_slats</property>
	    <interpolate1d>
		<property>fcs/surfaces/slats-pos-deg</property>
		<value>0</value> <value>0</value>
		<value>27.5</value> <property>aero/CMz_slats_27.5</property>
	    </interpolate1d>
	</product>
    </function>

    <!-- speedbrake -->
    <function name="aero/CMz_speedbrake_60">
	<table>
	    <independentVar lookup="row">velocities/mach</independentVar>
	    <independentVar lookup="column">aero/alpha-deg</independentVar>
	    <independentVar lookup="table">aero/beta-deg</independentVar>
	    <tableData breakPoint="-10.00000">
                -10.00     -5.00      0.00      5.00     10.00     15.00     20.00     30.00
		0.20000  -0.00417  -0.00522  -0.00533  -0.00497  -0.00437  -0.00500  -0.00487  -0.00117
		0.50000  -0.00453  -0.00579  -0.00573  -0.00521  -0.00464  -0.00415  -0.00459  -0.00160
	    </tableData>

	    <tableData breakPoint="0.00000">
                -10.00     -5.00      0.00      5.00     10.00     15.00     20.00     30.00
		0.20000  -0.00164  -0.00352  -0.00480  -0.00590  -0.00650  -0.00660  -0.00714  -0.00558
		0.50000  -0.00207  -0.00399  -0.00515  -0.00621  -0.00665  -0.00702  -0.00716  -0.00746
	    </tableData>

	    <tableData breakPoint="10.00000">
                -10.00     -5.00      0.00      5.00     10.00     15.00     20.00     30.00
		0.20000   0.00069  -0.00129  -0.00358  -0.00579  -0.00725  -0.00747  -0.00897  -0.01070
		0.50000   0.00154  -0.00128  -0.00391  -0.00561  -0.00731  -0.00819  -0.00995  -0.01157
	    </tableData>

	</table>
    </function>

    <function name="aero/CMz_speedbrake">
	<product>
	    <property>aero/tune/CMz_speedbrake</property>
	    <interpolate1d>
		<property>fcs/surfaces/speedbrake-pos-deg</property>
		<value>0</value> <value>0</value>
		<value>60</value> <property>aero/CMz_speedbrake_60</property>
	    </interpolate1d>
	</product>
    </function>

    <function name="aero/s/cmlp">
	<description>Roll damping derivative</description>
	<product>
	    <property>aero/pb</property>
	    <table>
		<independentVar lookup="row">velocities/mach</independentVar>
		<independentVar lookup="column">aero/alpha-deg</independentVar>
		<independentVar lookup="table">aero/beta-deg</independentVar>
		<tableData breakPoint="-10.0">
                    -10.0        -5.0         0.0         5.0        10.0        15.0        20.0        30.0
		    0.2      0.5223242   0.5300502   0.5353835   0.5234017   0.4840271   0.4279411   0.3645564   0.2334498
		    0.5      0.5530454   0.5571065   0.5612542   0.5537418   0.5188071   0.4656255   0.4063077   0.2819472
		    0.9      0.7327966   0.6855949   0.6794670   0.7027000   0.7578566   0.8338258   0.9084121   1.0254612
		</tableData>
		<tableData breakPoint="0.0">
                    -10.0        -5.0         0.0         5.0        10.0        15.0        20.0        30.0
		    0.2      0.5276639   0.5438349   0.5433008   0.5241658   0.4813415   0.4240131   0.3532323   0.2212163
		    0.5      0.5593911   0.5716324   0.5703329   0.5536603   0.5149498   0.4609155   0.3945248   0.2652250
		    0.9      0.7457484   0.6938644   0.6826174   0.7109326   0.7696768   0.8506537   0.9355168   1.0868719
		</tableData>
		<tableData breakPoint="10.0">
                    -10.0        -5.0         0.0         5.0        10.0        15.0        20.0        30.0
		    0.2      0.5256364   0.5341148   0.5323696   0.5177517   0.4794002   0.4264118   0.3639375   0.2308310
		    0.5      0.5581290   0.5612538   0.5579578   0.5478446   0.5141912   0.4631485   0.4090755   0.2791297
		    0.9      0.7262736   0.6833171   0.6760766   0.7021667   0.7703675   0.8506776   0.9651510   1.1023270
		</tableData>
	    </table>
	</product>
    </function>

    <function name="aero/s/cmlr">
	<description>Roll moment due to yaw rate</description>
	<product>
	    <property>aero/rb</property>
	    <table>
		<independentVar lookup="row">velocities/mach</independentVar>
		<independentVar lookup="column">aero/alpha-deg</independentVar>
		<independentVar lookup="table">aero/beta-deg</independentVar>
		<tableData breakPoint="-10.0">
                    -10.0        -5.0         0.0         5.0        10.0        15.0        20.0        30.0
		    0.2      0.0536310  -0.0217839  -0.0883850  -0.1659158  -0.2334029  -0.3138782  -0.3835660  -0.5098635
		    0.5      0.0852680  -0.0154048  -0.1100359  -0.2098065  -0.2985470  -0.3943042  -0.4848128  -0.6133195
		    0.9      0.6824691   0.1341339  -0.4218464  -0.9870946  -1.5005196  -1.9165554  -2.1671944  -2.4627749
		</tableData>
		<tableData breakPoint="0.0">
                    -10.0        -5.0         0.0         5.0        10.0        15.0        20.0        30.0
		    0.2      0.0469735  -0.0263689  -0.0955716  -0.1596957  -0.2236466  -0.2877532  -0.3582907  -0.5023259
		    0.5      0.0794628  -0.0189423  -0.1161274  -0.2051370  -0.2927870  -0.3733089  -0.4568579  -0.6109021
		    0.9      0.6305856   0.1163503  -0.4235635  -0.9573091  -1.4266310  -1.8217070  -2.1091084  -2.3412144
		</tableData>
		<tableData breakPoint="10.0">
                    -10.0        -5.0         0.0         5.0        10.0        15.0        20.0        30.0
		    0.2      0.0461547  -0.0233474  -0.1144706  -0.1620478  -0.2316185  -0.3010588  -0.3881803  -0.5128318
		    0.5      0.0767877  -0.0167246  -0.1327378  -0.2049535  -0.2972088  -0.3836319  -0.4733507  -0.6169378
		    0.9      0.5371090   0.0866812  -0.3994133  -0.8415991  -1.2642915  -1.6288918  -1.9054539  -2.1188110
		</tableData>
	    </table>
	</product>
    </function>

    <function name="aero/s/cmmq">
	<description>Pitch damping derivative</description>
	<product>
	    <property>aero/qb</property>
	    <table>
		<independentVar lookup="row">velocities/mach</independentVar>
		<independentVar lookup="column">aero/alpha-deg</independentVar>
		<independentVar lookup="table">aero/beta-deg</independentVar>
		<tableData breakPoint="-10.0">
                    -10.0        -5.0         0.0         5.0        10.0        15.0        20.0        30.0
		    0.2     -6.1511000  -6.2583750  -6.5265043  -6.5150108  -6.6198752  -5.9265395  -5.4727917  -4.5305161
		    0.5     -6.5613216  -6.6257441  -6.9164508  -6.8640513  -7.1175861  -6.3993553  -5.8238244  -4.9924030
		    0.9     -8.6277374  -8.5171944  -8.8403567  -8.9565496  -9.6009534   10.5848772   11.6012585   14.6639179
		</tableData>
		<tableData breakPoint="0.0">
                    -10.0        -5.0         0.0         5.0        10.0        15.0        20.0        30.0
		    0.2     -6.2423334  -6.2499714  -6.5372827  -6.5514617  -6.5131969  -6.2469503  -5.4812826  -5.0711944
		    0.5     -6.5867050  -6.5981941  -6.8551700  -6.9882990  -6.8884128  -6.9132880  -6.0814834  -5.2030735
		    0.9     -8.8129309  -8.6619577  -8.8874100  -9.4031014   10.5197863   11.9878872   11.8685614   15.2343187
		</tableData>
		<tableData breakPoint="10.0">
                    -10.0        -5.0         0.0         5.0        10.0        15.0        20.0        30.0
		    0.2     -6.1515753  -6.2564250  -6.5270375  -6.5015815  -6.6004658  -5.9318208  -5.4545507  -4.5434109
		    0.5     -6.5587630  -6.6256620  -6.9222093  -6.8722381  -7.1155983  -6.4388236  -5.8360163  -4.9961813
		    0.9     -8.6096068  -8.5171958  -8.8351982  -8.9472229  -9.5816706   10.5625661   11.6217806   14.6431930
		</tableData>
	    </table>
	</product>
    </function>

    <function name="aero/s/cmnp">
	<description>Yaw moment due to roll rate</description>
	<product>
	    <property>aero/pb</property>
	    <table>
		<independentVar lookup="row">velocities/mach</independentVar>
		<independentVar lookup="column">aero/alpha-deg</independentVar>
		<independentVar lookup="table">aero/beta-deg</independentVar>
		<tableData breakPoint="-10.0">
                    -10.0        -5.0         0.0         5.0        10.0        15.0        20.0        30.0
		    0.2      0.1916399   0.1923872   0.1987733   0.1883158   0.1719209   0.1781918   0.1733710   0.0618184
		    0.5      0.2006383   0.2019767   0.2046063   0.1970007   0.1789575   0.1869306   0.1582836   0.0216111
		    0.9      0.1311067   0.2258532   0.2528434   0.1988289   0.0867971  -0.0851264  -0.2542871  -0.6991378
		</tableData>
		<tableData breakPoint="0.0">
                    -10.0        -5.0         0.0         5.0        10.0        15.0        20.0        30.0
		    0.2      0.1643401   0.1816052   0.1945894   0.1932694   0.1744627   0.1432467   0.0897123   0.0007788
		    0.5      0.1587690   0.1841670   0.2002571   0.1942568   0.1691682   0.1337392   0.0878271  -0.0264597
		    0.9      0.0870743   0.1860643   0.2200894   0.1658482   0.0375146  -0.1379871  -0.3583164  -0.7052630
		</tableData>
		<tableData breakPoint="10.0">
                    -10.0        -5.0         0.0         5.0        10.0        15.0        20.0        30.0
		    0.2      0.1566016   0.1872272   0.1986105   0.1738238   0.1651702   0.1779142   0.1949351   0.0460368
		    0.5      0.1556752   0.1932883   0.2056115   0.1704659   0.1727779   0.1671472   0.1537154  -0.0012886
		    0.9      0.1026754   0.2069721   0.2218829   0.1654802   0.0829696  -0.0510677  -0.2073282  -0.5930890
		</tableData>
	    </table>
	</product>
    </function>

    <function name="aero/s/cmnr">
	<description>Yaw damping derivative</description>
	<product>
	    <property>aero/rb</property>
	    <table>
		<independentVar lookup="row">velocities/mach</independentVar>
		<independentVar lookup="column">aero/alpha-deg</independentVar>
		<independentVar lookup="table">aero/beta-deg</independentVar>
		<tableData breakPoint="-10.0">
                    -10.0        -5.0         0.0         5.0        10.0        15.0        20.0        30.0
		    0.2     -0.1316826  -0.0515817   0.0399265   0.1103995   0.1718016   0.2037059   0.2057449   0.2196370
		    0.5     -0.1343440  -0.0541122   0.0416188   0.1160857   0.1787601   0.2248107   0.2375372   0.2535265
		    0.9     -0.2009718  -0.0756141   0.0392191   0.1388739   0.2374674   0.3303930   0.4372918   0.6352935
		</tableData>
		<tableData breakPoint="0.0">
                    -10.0        -5.0         0.0         5.0        10.0        15.0        20.0        30.0
		    0.2     -0.1411589  -0.0465777   0.0419206   0.1236206   0.1796509   0.2234483   0.2696503   0.2386493
		    0.5     -0.1497520  -0.0484814   0.0438710   0.1287078   0.1952853   0.2434575   0.2866095   0.2718554
		    0.9     -0.1912329  -0.0655697   0.0477179   0.1545792   0.2631116   0.3796864   0.5030102   0.7140341
		</tableData>
		<tableData breakPoint="10.0">
                    -10.0        -5.0         0.0         5.0        10.0        15.0        20.0        30.0
		    0.2     -0.1322382  -0.0399797   0.0505188   0.1224485   0.1840353   0.2067459   0.2186005   0.2166905
		    0.5     -0.1243183  -0.0425101   0.0535609   0.1275356   0.1857782   0.2264700   0.2392607   0.2386848
		    0.9     -0.1793523  -0.0636955   0.0531560   0.1557056   0.2599009   0.3703921   0.4780968   0.6983873
		</tableData>
	    </table>
	</product>
    </function>

    <function name="aero/s/cfyp">
	<description>Side force due to roll rate</description>
	<product>
	    <property>aero/pb</property>
	    <table>
		<independentVar lookup="row">velocities/mach</independentVar>
		<independentVar lookup="column">aero/alpha-deg</independentVar>
		<independentVar lookup="table">aero/beta-deg</independentVar>
		<tableData breakPoint="-10.0">
                    -10.0        -5.0         0.0         5.0        10.0        15.0        20.0        30.0
		    0.2      0.0547856   0.0580959   0.0563290   0.0311157   0.0139661  -0.0524289  -0.0950507  -0.0646581
		    0.5      0.0493838   0.0623420   0.0571150   0.0341154   0.0058437   0.0160395  -0.0807203  -0.0380639
		    0.9      0.0719195   0.0540462   0.0553810   0.0259425   0.0072234  -0.0336502  -0.0051595   0.0722240
		</tableData>
		<tableData breakPoint="0.0">
                    -10.0        -5.0         0.0         5.0        10.0        15.0        20.0        30.0
		    0.2      0.0511028   0.0596846   0.0531282   0.0368694  -0.0130664  -0.0272153   0.0546234  -0.0583299
		    0.5      0.0504564   0.0640820   0.0533581   0.0358294   0.0167950  -0.0180030   0.0293681  -0.0415002
		    0.9      0.0788101   0.0650292   0.0531544   0.0372182   0.0240953   0.0459409   0.0989622   0.0884347
		</tableData>
		<tableData breakPoint="10.0">
                    -10.0        -5.0         0.0         5.0        10.0        15.0        20.0        30.0
		    0.2      0.0568533   0.0608687   0.0585513   0.0241006   0.0503435  -0.0266575  -0.1478955  -0.0705377
		    0.5      0.0493579   0.0636762   0.0609037   0.0261565  -0.0034937  -0.0337008  -0.1683895  -0.1109344
		    0.9      0.0519130   0.0553568   0.0477275   0.0295877   0.0015246  -0.0121323   0.0908544   0.2335930
		</tableData>
	    </table>
	</product>
    </function>

    <function name="aero/s/cfyr">
	<description>Side force due to yaw rate</description>
	<product>
	    <property>aero/rb</property>
	    <table>
		<independentVar lookup="row">velocities/mach</independentVar>
		<independentVar lookup="column">aero/alpha-deg</independentVar>
		<independentVar lookup="table">aero/beta-deg</independentVar>
		<tableData breakPoint="-10.0">
                    -10.0        -5.0         0.0         5.0        10.0        15.0        20.0        30.0
		    0.2      0.3734149   0.3848979   0.3859783   0.3326219   0.3028850   0.3157337   0.4851431   0.3423150
		    0.5      0.3910545   0.4024873   0.3819062   0.3697319   0.3215112   0.4466540   0.3403988   0.3534753
		    0.9      0.4410902   0.4442689   0.4230157   0.3731601   0.3055144   0.2330801   0.3036199  -0.1651062
		</tableData>
		<tableData breakPoint="0.0">
                    -10.0        -5.0         0.0         5.0        10.0        15.0        20.0        30.0
		    0.2      0.3352490   0.3556420   0.3537939   0.3822283   0.3507548   0.2737693   0.1291510   0.1509105
		    0.5      0.3361874   0.3610353   0.3650674   0.3345182   0.3456471   0.2508497   0.2088847   0.1959951
		    0.9      0.3976571   0.3952304   0.3751226   0.3337255   0.2595630   0.1735279   0.0862429   0.0920006
		</tableData>
		<tableData breakPoint="10.0">
                    -10.0        -5.0         0.0         5.0        10.0        15.0        20.0        30.0
		    0.2      0.4109551   0.3854274   0.3754429   0.3833000   0.2910658   0.3709171   0.4160189   0.2909479
		    0.5      0.4290506   0.3925709   0.3811726   0.4089258   0.3300664   0.2599455   0.3991336   0.2411026
		    0.9      0.4198133   0.3717484   0.3342717   0.3569516   0.3727100   0.3754907   0.3165652   0.1432332
		</tableData>
	    </table>
	</product>
    </function>

    <property value="0.75">aero/tune/CL_base</property>
    <property value="1">aero/tune/CL_elevator</property>
    <property value="1">aero/tune/CL_flap</property>
    <property value="1">aero/tune/CL_left-flaperon</property>
    <property value="1">aero/tune/CL_right-flaperon</property>
    <property value="1">aero/tune/CL_rudder</property>
    <property value="1">aero/tune/CL_slats</property>
    <property value="1">aero/tune/CL_speedbrake</property>
    <property value="1">aero/tune/CDtot_elevator</property>
    <property value="1">aero/tune/CDtot_flap</property>
    <property value="1">aero/tune/CDtot_left-flaperon</property>
    <property value="1">aero/tune/CDtot_right-flaperon</property>
    <property value="1">aero/tune/CDtot_rudder</property>
    <property value="1">aero/tune/CDtot_slats</property>
    <property value="1">aero/tune/CDtot_speedbrake</property>
    <property value="1">aero/tune/CS_elevator</property>
    <property value="1">aero/tune/CS_flap</property>
    <property value="1">aero/tune/CS_left-flaperon</property>
    <property value="1">aero/tune/CS_right-flaperon</property>
    <property value="1">aero/tune/CS_rudder</property>
    <property value="1">aero/tune/CS_slats</property>
    <property value="1">aero/tune/CS_speedbrake</property>
    <property value="1">aero/tune/CMx_elevator</property>
    <property value="1">aero/tune/CMx_flap</property>
    <property value="1">aero/tune/CMx_left-flaperon</property>
    <property value="1">aero/tune/CMx_right-flaperon</property>
    <property value="1">aero/tune/CMx_rudder</property>
    <property value="1">aero/tune/CMx_slats</property>
    <property value="1">aero/tune/CMx_speedbrake</property>
    <property value="1">aero/tune/CMy_elevator</property>
    <property value="1">aero/tune/CMy_flap</property>
    <property value="1">aero/tune/CMy_left-flaperon</property>
    <property value="1">aero/tune/CMy_right-flaperon</property>
    <property value="1">aero/tune/CMy_rudder</property>
    <property value="1">aero/tune/CMy_slats</property>
    <property value="1">aero/tune/CMy_speedbrake</property>
    <property value="1">aero/tune/CMz_elevator</property>
    <property value="1">aero/tune/CMz_flap</property>
    <property value="1">aero/tune/CMz_left-flaperon</property>
    <property value="1">aero/tune/CMz_right-flaperon</property>
    <property value="1">aero/tune/CMz_rudder</property>
    <property value="1">aero/tune/CMz_slats</property>
    <property value="1">aero/tune/CMz_speedbrake</property>

    <axis name="LIFT">

	<function name="aero/force/CL">
	    <sum>
		<property>aero/CL_base</property>
		<property>aero/CL_elevator</property>
		<property>aero/CL_right-flaperon</property>
		<property>aero/CL_left-flaperon</property>
		<property>aero/CL_slats</property>
		<property>aero/CL_flap</property>
	    </sum>
	</function>

	<function name="aero/force/Lift_combined">
	    <description>Lift due to alpha</description>
	    <product>
		<property>aero/qbar-psf</property>
		<property>metrics/Sw-sqft</property>
		<product>
		    <property>aero/force/CL</property>
		    <difference>
			<value>1</value>
			<product>
			    <property>fcs/wing-fold/wing-fold-pos</property>
			    <value>0.9</value>
			</product>
		    </difference>
		</product>
	    </product>
	</function>

	<function name="aero/force/Lift_pitch_rate">
            <description>Lift due to pitch rate</description>
            <product>
		<property>aero/qbar-psf</property>
		<property>metrics/Sw-sqft</property>
		<property>velocities/q-aero-rad_sec</property>
		<property>aero/ci2vel</property>
		<value> 4.2695 </value>
            </product>
	</function>

	<function name="aero/force/Lift_alpha_rate">
            <description>Lift due to alpha rate</description>
            <product>
		<property>aero/qbar-psf</property>
		<property>metrics/Sw-sqft</property>
		<property>aero/alphadot-rad_sec</property>
		<property>aero/ci2vel</property>
		<value> 2.3362 </value>
            </product>
	</function>

    </axis>

    <axis name="DRAG">

	<function name="aero/force/CDtot">
	    <sum>
		<property>aero/CDtot_base</property>
		<property>aero/CDtot_elevator</property>
		<property>aero/CDtot_right-flaperon</property>
		<property>aero/CDtot_left-flaperon</property>
		<property>aero/CDtot_slats</property>
		<property>aero/CDtot_flap</property>
	    </sum>
	</function>

	<function name="aero/force/Drag_combined">
	    <description>Drag at zero lift</description>
	    <product>
		<property>aero/qbar-psf</property>
		<property>metrics/Sw-sqft</property>
		<property>aero/force/CDtot</property>
	    </product>
	</function>

	<function name="aero/force/CD_stores">
	    <product>
		<property>aero/qbar-psf</property>
		<sum>
		    <product>
			<property>aero/cd_p1</property>
			<property>aero/eda_p1</property>
		    </product>
		    <product>
			<property>aero/cd_p2</property>
			<property>aero/eda_p2</property>
		    </product>
		    <product>
			<property>aero/cd_p3</property>
			<property>aero/eda_p3</property>
		    </product>
		    <product>
			<property>aero/cd_p4</property>
			<property>aero/eda_p4</property>
		    </product>
		    <product>
			<property>aero/cd_p5</property>
			<property>aero/eda_p5</property>
		    </product>
		</sum>
	    </product>
	</function>

	<function name="aero/force/Drag_gear">
	    <description>Drag due to gear</description>
            <product>
		<property>aero/qbar-psf</property>
		<property>metrics/Sw-sqft</property>
		<property>gear/gear-pos-norm</property>
		<value> 0.0200 </value>
            </product>
	</function>

	<function name="aero/force/Drag_speedbrake">
	    <description>Drag due to speedbrakes</description>
            <product>
		<property>aero/qbar-psf</property>
		<property>metrics/Sw-sqft</property>
		<property>fcs/speedbrake-pos-norm</property>
		<value> 0.0800 </value>
            </product>
	</function>

    </axis>

    <axis name="SIDE">

	<function name="aero/force/CS">
	    <sum>
		<property>aero/CS_base</property>
		<property>aero/CS_rudder</property>
		<property>aero/CS_flap</property>
		<property>aero/s/cfyp</property>
		<property>aero/s/cfyr</property>
	    </sum>
	</function>

	<function name="aero/force/Side_combined">
	    <description>Side force</description>
	    <product>
		<property>aero/qbar-psf</property>
		<property>metrics/Sw-sqft</property>
		<property>aero/force/CS</property>
	    </product>
	</function>

	<function name="aero/force/Side_rudder">
	    <description>Side force due to rudder</description>
	    <product>
		<property>aero/qbar-psf</property>
		<property>metrics/Sw-sqft</property>
		<property>fcs/rudder-pos-rad</property>
		<value> 0.2108 </value>
	    </product>
	</function>

    </axis>

    <axis name="PITCH">

	<function name="aero/moment/CMy">
	    <sum>
		<property>aero/CMy_flap</property>
		<property>aero/CMy_slats</property>
		<property>aero/s/cmmq</property>
	    </sum>
	</function>

	<function name="aero/moment/Pitch_combined">
	    <description>Pitch moment due to alpha</description>
	    <product>
		<property>aero/qbar-psf</property>
		<property>metrics/Sw-sqft</property>
		<property>metrics/cbarw-ft</property>
		<property>aero/moment/CMy</property>
	    </product>
	</function>

	<function name="aero/moment/Pitch_alpha">
	    <description>Pitch moment due to alpha</description>
	    <product>
		<property>aero/qbar-psf</property>
		<property>metrics/Sw-sqft</property>
		<property>metrics/cbarw-ft</property>
		<property>aero/alpha-rad</property>
		<value> -0.1 </value>
	    </product>
	</function>

	<function name="aero/moment/Pitch_elevator">
	    <description>Pitch moment due to elevator</description>
	    <product>
		<property>aero/qbar-psf</property>
		<property>metrics/Sw-sqft</property>
		<property>metrics/cbarw-ft</property>
		<property>fcs/surfaces/elevator-pos-rad</property>
		<table>
		    <independentVar lookup="row">velocities/mach</independentVar>
		    <tableData>
			0.0    -1.2
			2.0    -0.3
		    </tableData>
		</table>
	    </product>
	</function>

	<function name="aero/moment/Pitch_damp">
	    <description>Pitch moment due to pitch rate</description>
	    <product>
		<property>aero/qbar-psf</property>
		<property>metrics/Sw-sqft</property>
		<property>metrics/cbarw-ft</property>
		<property>aero/ci2vel</property>
		<property>velocities/q-aero-rad_sec</property>
		<value> -9.7532 </value>
	    </product>
	</function>

	<function name="aero/moment/Pitch_alphadot">
	    <description>Pitch moment due to alpha rate</description>
	    <product>
		<property>aero/qbar-psf</property>
		<property>metrics/Sw-sqft</property>
		<property>metrics/cbarw-ft</property>
		<property>aero/ci2vel</property>
		<property>aero/alphadot-rad_sec</property>
		<value> -5.3369 </value>
	    </product>
	</function>

    </axis>

    <axis name="ROLL">
	<function name="aero/moment/CMx">
	    <sum>
		<!-- <property>aero/CMx_base</property> -->
		<property>aero/CMx_rudder</property>
		<property>aero/s/cmlr</property>
		<product>
		    <sum>
			<property>aero/CMx_left-flaperon</property>
			<property>aero/CMx_right-flaperon</property>
			<property>aero/s/cmlp</property>
		    </sum>
		    <value>-1</value>
		</product>
	    </sum>
	</function>

	<function name="aero/moment/Roll_combined">
	    <description>Roll moment</description>
	    <product>
		<property>aero/qbar-psf</property>
		<property>metrics/Sw-sqft</property>
		<property>metrics/bw-ft</property>
		<property>aero/moment/CMx</property>
	    </product>
	</function>
    </axis>

    <axis name="YAW">

	<function name="aero/moment/CMz">
	    <sum>
		<property>aero/CMz_base</property>
		<property>aero/CMz_left-flaperon</property>
		<property>aero/CMz_right-flaperon</property>
		<!-- <property>aero/s/cmnr</property> -->
		<property>aero/s/cmnp</property>
		<product>
		    <property>aero/CMz_rudder</property>
		    <value>-1</value>
		</product>
	    </sum>
	</function>

	<function name="aero/moment/Yaw_combined">
	    <description>Yaw moment</description>
	    <product>
		<property>aero/qbar-psf</property>
		<property>metrics/Sw-sqft</property>
		<property>metrics/bw-ft</property>
		<property>aero/moment/CMz</property>
	    </product>
	</function>

	<function name="aero/moment/Yaw_beta">
	    <description>Yaw moment due to beta</description>
	    <product>
		<property>aero/qbar-psf</property>
		<property>metrics/Sw-sqft</property>
		<property>metrics/bw-ft</property>
		<property>aero/beta-rad</property>
		<value> 0.1926 </value> <!-- 0.1626 -->
	    </product>
	</function>

	<function name="aero/moment/Yaw_stores">
	    <product>
		<property>aero/qbar-psf</property>
		<sum>
		    <product>
			<property>aero/cd_p1</property>
			<property>aero/eda_p1</property>
			<property>inertia/pointmass-location-Y-inches</property>
		    </product>
		    <product>
			<property>aero/cd_p2</property>
			<property>aero/eda_p2</property>
			<property>inertia/pointmass-location-Y-inches[1]</property>
		    </product>
		    <product>
			<property>aero/cd_p3</property>
			<property>aero/eda_p3</property>
			<property>inertia/pointmass-location-Y-inches[2]</property>
		    </product>
		    <product>
			<property>aero/cd_p4</property>
			<property>aero/eda_p4</property>
			<property>inertia/pointmass-location-Y-inches[3]</property>
		    </product>
		    <product>
			<property>aero/cd_p5</property>
			<property>aero/eda_p5</property>
			<property>inertia/pointmass-location-Y-inches[4]</property>
		    </product>
		</sum>
	    </product>
	</function>

	<function name="aero/moment/Yaw_roll_rate">
	    <description>Yaw moment due to roll rate</description>
	    <product>
		<property>aero/qbar-psf</property>
		<property>metrics/Sw-sqft</property>
		<property>metrics/bw-ft</property>
		<property>aero/bi2vel</property>
		<property>velocities/r-aero-rad_sec</property>
		<value>-1.1</value>
	    </product>
	</function>

    </axis>
</aerodynamics>
